# OpenSim document version 40000
COMAKTool:
  model_file: ./shared/smith2019.osim
  coordinates_file: ./shared/overground_17_ik.mot
  external_loads_file: ./shared/overground_17_ext_loads.xml
  results_directory: ./results/comak
  results_prefix: walking
  replace_force_set: false
  force_set_file: ./shared/smith2019_reserve_actuators.xml
  start_time: 1.11
  stop_time: 2.32
  time_step: 0.01
  lowpass_filter_frequency: 6
  print_processed_input_kinematics: false
  prescribed_coordinates: /jointset/gnd_pelvis/pelvis_tx /jointset/gnd_pelvis/pelvis_ty /jointset/gnd_pelvis/pelvis_tz /jointset/gnd_pelvis/pelvis_tilt /jointset/gnd_pelvis/pelvis_list /jointset/gnd_pelvis/pelvis_rot /jointset/subtalar_r/subt_angle_r /jointset/mtp_r/mtp_angle_r /jointset/hip_l/hip_flex_l /jointset/hip_l/hip_add_l /jointset/hip_l/hip_rot_l /jointset/pf_l/pf_l_r3 /jointset/pf_l/pf_l_tx /jointset/pf_l/pf_l_ty /jointset/knee_l/knee_flex_l /jointset/ankle_l/ankle_flex_l /jointset/subtalar_l/subt_angle_l /jointset/mtp_l/mtp_angle_l /jointset/pelvis_torso/lumbar_ext /jointset/pelvis_torso/lumbar_latbend /jointset/pelvis_torso/lumbar_rot /jointset/torso_neckhead/neck_ext /jointset/torso_neckhead/neck_latbend /jointset/torso_neckhead/neck_rot /jointset/acromial_r/arm_add_r /jointset/acromial_r/arm_flex_r /jointset/acromial_r/arm_rot_r /jointset/elbow_r/elbow_flex_r /jointset/radioulnar_r/pro_sup_r /jointset/radius_hand_r/wrist_flex_r /jointset/acromial_l/arm_add_l /jointset/acromial_l/arm_flex_l /jointset/acromial_l/arm_rot_l /jointset/elbow_l/elbow_flex_l /jointset/radioulnar_l/pro_sup_l /jointset/radius_hand_l/wrist_flex_l
  primary_coordinates: /jointset/hip_r/hip_flex_r /jointset/hip_r/hip_add_r /jointset/hip_r/hip_rot_r /jointset/knee_r/knee_flex_r /jointset/ankle_r/ankle_flex_r
  settle_secondary_coordinates_at_start: true
  settle_threshold: 0.0001
  settle_accuracy: 0.0001
  settle_internal_step_limit: 10000
  print_settle_sim_results: true
  settle_sim_results_directory: ./results/comak
  settle_sim_results_prefix: walking_settle_sim
  max_iterations: 25
  udot_tolerance: 1
  udot_worse_case_tolerance: 50
  unit_udot_epsilon: 1e-6
  optimization_scale_delta_coord: 1
  ipopt_diagnostics_level: 3
  ipopt_max_iterations: 500
  ipopt_convergence_tolerance: 0.0001
  ipopt_constraint_tolerance: 0.0001
  ipopt_limited_memory_history: 200
  ipopt_nlp_scaling_max_gradient: 10000
  ipopt_nlp_scaling_min_value: 1e-8
  ipopt_obj_scaling_factor: 1
  activation_exponent: 2
  contact_energy_weight: 0
  non_muscle_actuator_weight: 1000
  model_assembly_accuracy: 1e-12
  use_visualizer: false
  verbose: 2
  COMAKSecondaryCoordinateSet:
    COMAKSecondaryCoordinate knee_add_r: coordinate=/jointset/knee_r/knee_add_r max_change=0.005
    COMAKSecondaryCoordinate knee_rot_r: coordinate=/jointset/knee_r/knee_rot_r max_change=0.005
    COMAKSecondaryCoordinate knee_tx_r: coordinate=/jointset/knee_r/knee_tx_r max_change=0.001
    COMAKSecondaryCoordinate knee_ty_r: coordinate=/jointset/knee_r/knee_ty_r max_change=0.001
    COMAKSecondaryCoordinate knee_tz_r: coordinate=/jointset/knee_r/knee_tz_r max_change=0.001
    COMAKSecondaryCoordinate pf_flex_r: coordinate=/jointset/pf_r/pf_flex_r max_change=0.005
    COMAKSecondaryCoordinate pf_rot_r: coordinate=/jointset/pf_r/pf_rot_r max_change=0.005
    COMAKSecondaryCoordinate pf_tilt_r: coordinate=/jointset/pf_r/pf_tilt_r max_change=0.005
    COMAKSecondaryCoordinate pf_tx_r: coordinate=/jointset/pf_r/pf_tx_r max_change=0.001
    COMAKSecondaryCoordinate pf_ty_r: coordinate=/jointset/pf_r/pf_ty_r max_change=0.001
    COMAKSecondaryCoordinate pf_tz_r: coordinate=/jointset/pf_r/pf_tz_r max_change=0.001
    COMAKSecondaryCoordinate meniscus_medial_flex_r: coordinate=/jointset/meniscus_medial_r/meniscus_medial_flex_r
        max_change=0.005
    COMAKSecondaryCoordinate meniscus_medial_add_r: coordinate=/jointset/meniscus_medial_r/meniscus_medial_add_r
        max_change=0.005
    COMAKSecondaryCoordinate meniscus_medial_rot_r: coordinate=/jointset/meniscus_medial_r/meniscus_medial_rot_r
        max_change=0.005
    COMAKSecondaryCoordinate meniscus_medial_tx_r: coordinate=/jointset/meniscus_medial_r/meniscus_medial_tx_r
        max_change=0.001
    COMAKSecondaryCoordinate meniscus_medial_ty_r: coordinate=/jointset/meniscus_medial_r/meniscus_medial_ty_r
        max_change=0.001
    COMAKSecondaryCoordinate meniscus_medial_tz_r: coordinate=/jointset/meniscus_medial_r/meniscus_medial_tz_r
        max_change=0.001
    COMAKSecondaryCoordinate meniscus_lateral_flex_r: coordinate=/jointset/meniscus_lateral_r/meniscus_lateral_flex_r
        max_change=0.005
    COMAKSecondaryCoordinate meniscus_lateral_add_r: coordinate=/jointset/meniscus_lateral_r/meniscus_lateral_add_r
        max_change=0.005
    COMAKSecondaryCoordinate meniscus_lateral_rot_r: coordinate=/jointset/meniscus_lateral_r/meniscus_lateral_rot_r
        max_change=0.005
    COMAKSecondaryCoordinate meniscus_lateral_tx_r: coordinate=/jointset/meniscus_lateral_r/meniscus_lateral_tx_r
        max_change=0.001
    COMAKSecondaryCoordinate meniscus_lateral_ty_r: coordinate=/jointset/meniscus_lateral_r/meniscus_lateral_ty_r
        max_change=0.001
    COMAKSecondaryCoordinate meniscus_lateral_tz_r: coordinate=/jointset/meniscus_lateral_r/meniscus_lateral_tz_r
        max_change=0.001
  COMAKCostFunctionParameterSet:
    COMAKCostFunctionParameter addbrev_r: actuator=/forceset/addbrev_r desired_activation=Constant(value=-0.3131274)
    COMAKCostFunctionParameter addlong_r: actuator=/forceset/addlong_r desired_activation=Constant(value=-0.0102356)
    COMAKCostFunctionParameter addmagDist_r: actuator=/forceset/addmagDist_r
        desired_activation=Constant(value=-0.0544138)
    COMAKCostFunctionParameter addmagIsch_r: actuator=/forceset/addmagIsch_r
        desired_activation=Constant(value=0.146313)
    COMAKCostFunctionParameter addmagMid_r: actuator=/forceset/addmagMid_r desired_activation=Constant(value=0.2093648)
    COMAKCostFunctionParameter addmagProx_r: actuator=/forceset/addmagProx_r
        desired_activation=Constant(value=0.2546867)
    COMAKCostFunctionParameter bflh_r: actuator=/forceset/bflh_r desired_activation=Constant(value=-0.2239749)
    COMAKCostFunctionParameter bfsh_r: actuator=/forceset/bfsh_r desired_activation=Constant(value=0.1797027)
    COMAKCostFunctionParameter edl_r: actuator=/forceset/edl_r desired_activation=Constant(value=0.155098)
    COMAKCostFunctionParameter ehl_r: actuator=/forceset/ehl_r desired_activation=Constant(value=-0.3373883)
    COMAKCostFunctionParameter fdl_r : actuator=/forceset/fdl_r desired_activation=Constant(value=-0.3810023)
    COMAKCostFunctionParameter fhl_r: actuator=/forceset/fhl_r desired_activation=Constant(value=-0.001635948)
    COMAKCostFunctionParameter gaslat_r: actuator=/forceset/gaslat_r desired_activation=Constant(value=0.459744)
    COMAKCostFunctionParameter gasmed_r: actuator=/forceset/gasmed_r desired_activation=Constant(value=-0.1596143)
    COMAKCostFunctionParameter gem_r: actuator=/forceset/gem_r desired_activation=Constant(value=0.08526775)
    COMAKCostFunctionParameter glmax1_r: actuator=/forceset/glmax1_r desired_activation=Constant(value=-0.2761881)
    COMAKCostFunctionParameter glmax2_r: actuator=/forceset/glmax2_r desired_activation=Constant(value=0.2512671)
    COMAKCostFunctionParameter glmax3_r: actuator=/forceset/glmax3_r desired_activation=Constant(value=-0.2449049)
    COMAKCostFunctionParameter glmed1_r: actuator=/forceset/glmed1_r desired_activation=Constant(value=0.005957052)
    COMAKCostFunctionParameter glmed2_r: actuator=/forceset/glmed2_r desired_activation=Constant(value=0.1990767)
    COMAKCostFunctionParameter glmed3_r: actuator=/forceset/glmed3_r desired_activation=Constant(value=0.3909033)
    COMAKCostFunctionParameter glmin1_r: actuator=/forceset/glmin1_r desired_activation=Constant(value=0.4592914)
    COMAKCostFunctionParameter glmin2_r: actuator=/forceset/glmin2_r desired_activation=Constant(value=0.04721553)
    COMAKCostFunctionParameter glmin3_r: actuator=/forceset/glmin3_r desired_activation=Constant(value=-0.3613756)
    COMAKCostFunctionParameter grac_r: actuator=/forceset/grac_r desired_activation=Constant(value=-0.350706)
    COMAKCostFunctionParameter iliacus_r: actuator=/forceset/iliacus_r desired_activation=Constant(value=-0.2424917)
    COMAKCostFunctionParameter pect_r: actuator=/forceset/pect_r desired_activation=Constant(value=0.3407173)
    COMAKCostFunctionParameter perbrev_r: actuator=/forceset/perbrev_r desired_activation=Constant(value=-0.2457178)
    COMAKCostFunctionParameter perlong_r: actuator=/forceset/perlong_r desired_activation=Constant(value=0.3142848)
    COMAKCostFunctionParameter pertert_r: actuator=/forceset/pertert_r desired_activation=Constant(value=-0.256475)
    COMAKCostFunctionParameter piri_r: actuator=/forceset/piri_r desired_activation=Constant(value=0.4292636)
    COMAKCostFunctionParameter psoas_r: actuator=/forceset/psoas_r desired_activation=Constant(value=-0.1500162)
    COMAKCostFunctionParameter quadfem_r: actuator=/forceset/quadfem_r desired_activation=Constant(value=-0.3034047)
    COMAKCostFunctionParameter recfem_r: actuator=/forceset/recfem_r desired_activation=Constant(value=-0.2489161)
    COMAKCostFunctionParameter sart_r: actuator=/forceset/sart_r desired_activation=Constant(value=0.1160447)
    COMAKCostFunctionParameter semimem_r: actuator=/forceset/semimem_r desired_activation=Constant(value=-0.02671115)
    COMAKCostFunctionParameter semiten_r: actuator=/forceset/semiten_r desired_activation=Constant(value=-0.1483405)
    COMAKCostFunctionParameter soleus_r: actuator=/forceset/soleus_r desired_activation=Constant(value=0.3308286)
    COMAKCostFunctionParameter tfl_r: actuator=/forceset/tfl_r desired_activation=Constant(value=0.08526409)
    COMAKCostFunctionParameter tibant_r: actuator=/forceset/tibant_r desired_activation=Constant(value=0.04972361)
    COMAKCostFunctionParameter tibpost_r: actuator=/forceset/tibpost_r desired_activation=Constant(value=0.4171937)
    COMAKCostFunctionParameter vasint_r: actuator=/forceset/vasint_r desired_activation=Constant(value=-0.214161)
    COMAKCostFunctionParameter vaslat_r: actuator=/forceset/vaslat_r desired_activation=Constant(value=0.2572002)
    COMAKCostFunctionParameter vasmed_r: actuator=/forceset/vasmed_r desired_activation=Constant(value=0.2537291)
