# OpenSim document version 40000
Model DM:
  gravity: 0 -9.80665 0
  length_units: m
  force_units: N
  defaults: Millard2012EquilibriumMuscle default: optimal_fiber_length=0 pennation_angle_at_optimal=0 [radians]
      max_contraction_velocity=10 default_activation=0.01 default_fiber_length=0.1
      activation_time_constant=0.01 [seconds] deactivation_time_constant=0.03 [seconds]
  Ground
  BodySet:
    Body pelvis: mass=7.724249 [kg] mass_center=(-0.08599185 -0.02484038 0)
        inertia=(0.0461627 0.052392 0.0575082 0 0 0) meshes=(pelvis.vtp pelvflip.vtp sacrum.vtp)
      WrapEllipsoid PS_at_brim_r: translation=(-0.0768 -0.063 0.0632) quadrant=all dimensions=(0.0501 0.0474 0.0684)
      WrapEllipsoid IL_at_brim_r: translation=(-0.066 -0.0536 0.0728) quadrant=all dimensions=(0.0529 0.064 0.0684)
      WrapEllipsoid Gmax_at_pelvis_r: xyz_body_rotation=(-0.6370452 0.3836234 -0.6848672)
          translation=(-0.0766 -0.0794 0.064) quadrant=all dimensions=(0.0385 0.0385 0.0578)
      WrapEllipsoid PS_at_brim_l: translation=(-0.0768 -0.063 -0.0632) quadrant=all dimensions=(0.0501 0.0474 0.0684)
      WrapEllipsoid IL_at_brim_l: translation=(-0.066 -0.0536 -0.0728) quadrant=all dimensions=(0.0529 0.064 0.0684)
      WrapEllipsoid Gmax_at_pelvis_l: xyz_body_rotation=(0.6370452 -0.3836234 -0.6848672)
          translation=(-0.0766 -0.0794 -0.064) quadrant=all dimensions=(0.0385 0.0385 0.0578)
    Body torso: mass=22.3291 mass_center=(0 0.2100511 0) inertia=(0.272703 0.17128 0.369016 0 0 0)
        meshes=(lumbar1sm.vtp lumbar2sm.vtp lumbar3sm.vtp lumbar4sm.vtp lumbar5.vtp ribcage_s.vtp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)
    Body neckhead: mass=4.799131 mass_center=(0.02359039 0.1322872 0) inertia=(0.0188501 0.0129416 0.0174421 0 0 0)
        meshes=(cerv1sm.vtp cerv2sm.vtp cerv3sm.vtp cerv4sm.vtp cerv5sm.vtp cerv6sm.vtp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)
    Body humerus_r: mass=1.874012 mass_center=(0 -0.1719847 0) inertia=(0.0120393 0.00415319 0.0135137 0 0 0)
        meshes=humerus_rv.vtp
    Body ulna_r: mass=0.5601291 mass_center=(0 -0.1245689 0) inertia=(0.00291737 0.000608688 0.00316459 0 0 0)
        meshes=ulna_rv.vtp
    Body radius_r: mass=0.5601291 mass_center=(0 -0.1245689 0) inertia=(0.00291737 0.000608688 0.00316459 0 0 0)
        meshes=radius_rv.vtp
    Body hand_r: mass=0.4218256 mass_center=(0 -0.07037973 0) inertia=(0.00087856 0.000538758 0.00131981 0 0 0)
        meshes=(pisiform_rvs.vtp lunate_rvs.vtp scaphoid_rvs.vtp triquetrum_rvs.vtp hamate_rvs.vtp capitate_rvs.vtp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)
    Body humerus_l: mass=1.874012 mass_center=(0 -0.1719847 0) inertia=(0.0120393 0.00415319 0.0135137 0 0 0)
        meshes=humerus_lv.vtp
    Body ulna_l: mass=0.5601291 mass_center=(0 -0.1245689 0) inertia=(0.00291737 0.000608688 0.00316459 0 0 0)
        meshes=ulna_lv.vtp
    Body radius_l: mass=0.5601291 mass_center=(0 -0.1245689 0) inertia=(0.00291737 0.000608688 0.00316459 0 0 0)
        meshes=radius_lv.vtp
    Body hand_l: mass=0.4218256 mass_center=(0 -0.07037973 0) inertia=(0.00087856 0.000538758 0.00131981 0 0 0)
        meshes=(pisiform_lvs.vtp lunate_lvs.vtp scaphoid_lvs.vtp triquetrum_lvs.vtp hamate_lvs.vtp capitate_lvs.vtp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)
    Body femur_r: mass=9.3424 mass_center=(0 -0.1710809 0) inertia=(0.1765 0.0362015 0.1765 0 0 0)
        meshes=(femur_gc.obj femur_component_gc_m1_reduced.obj)
      WrapEllipsoid AB_at_femshaft_r: xyz_body_rotation=(0.1117011 0 0.1762782) translation=(0.0154 -0.1236 0.0269)
          quadrant=all dimensions=(0.0174 0.0738 0.0222)
      WrapEllipsoid AL_at_femshaft_r: xyz_body_rotation=(0.1117011 0 0.05410521) translation=(0.0326 -0.2511 0.0126)
          quadrant=all dimensions=(0.0212 0.1055 0.019)
      WrapEllipsoid AMprox_at_femshaft_r: xyz_body_rotation=(0.1117011 0 0.2111848) translation=(0.0063 -0.0819 0.0315)
          quadrant=all dimensions=(0.0223 0.0738 0.0338)
      WrapEllipsoid AMmid_at_femshaft_r: xyz_body_rotation=(0.1117011 0 0.1239184) translation=(0.0243 -0.1695 0.0217)
          quadrant=all dimensions=(0.0226 0.1266 0.0327)
      WrapEllipsoid AMdist_at_femshaft_r: xyz_body_rotation=(0.1117011 0 0.1762782) translation=(0.0324 -0.2751 0.0099)
          quadrant=all dimensions=(0.023 0.211 0.0227)
      WrapEllipsoid AMisch_at_condyles_r: xyz_body_rotation=(0.1117011 0 -0.434587)
          translation=(-0.0302 -0.3977 -0.0039) quadrant=all dimensions=(0.0527 0.2532 0.0424)
      WrapEllipsoid PECT_at_femshaft_r: xyz_body_rotation=(0.1117011 0 0.2111848) translation=(0.008 -0.09 0.0306)
          quadrant=all dimensions=(0.0175 0.0527 0.0138)
      WrapCylinder KnExt_at_fem_r: translation=(0.0106 -0.4188 0) quadrant=x radius=0.0295 length=0.211
      WrapCylinder KnExt_vasint_at_fem_r: translation=(0.0106 -0.4188 0) quadrant=x radius=0.0274 length=0.211
      WrapEllipsoid Gastroc_at_Condyles_r: xyz_body_rotation=(0.05637413 -0.06928957 0.02251475)
          translation=(0.0011 -0.4297 0) quadrant=all dimensions=(0.0316 0.0264 0.1583)
      WrapEllipsoid lPFL_r: xyz_body_rotation=(-0.1569051 0.2928662 -0.2898992) translation=(0.0197 -0.4203 0.0212)
          quadrant=all dimensions=(0.02 0.035 0.013)
    Body femur_distal_r: mass=0.00922023 mass_center=(0 0 0) inertia=(0.00102623 0.00102623 0.00102623 0 0 0)
      WrapCylinder Capsule_r: xyz_body_rotation=(-0.02984513 0.02007129 0.3316126) translation=(-0.0042 -0.0032 0)
          quadrant=all radius=0.019 length=0.5275
    Body tibia_proximal_r: mass=0.00922023 mass_center=(0 0 0) inertia=(0.00102623 0.00102623 0.00102623 0 0 0)
        meshes=(tibia_gc.obj tibia_insert_gc_p1_reduced.obj tibia_tray_gc_p1_reduced.obj fibula_gc.obj)
      WrapEllipsoid Med_Lig_r: xyz_body_rotation=(-0.1048943 -0.03490659 0.1816888)
          translation=(0.0077 -0.0432 -0.0256) quadrant=all dimensions=(0.032 0.02 0.019)
      WrapEllipsoid Med_LigP_r: xyz_body_rotation=(2.805966 -0.6002187 0.6862635) translation=(-0.0109 -0.035 -0.024)
          quadrant=all dimensions=(0.0264 0.016 0.01)
    Body patella_com_r: mass=9.2e-7 mass_center=(0 0 0) inertia=(1.026e-7 1.026e-7 1.026e-7 0 0 0)
    Body patella_r: mass=0.4494863 mass_center=(0.001899 0.027852 0) inertia=(1.64198e-5 7.59414e-5 7.59414e-5 0 0 0)
        meshes=(patella.obj patella_button.obj)
      WrapEllipsoid PatTen_r: xyz_body_rotation=(0 0 0.00994838) translation=(0.0005 0.0084 0.0005) quadrant=all
          dimensions=(0.0053 0.0084 0.0127)
    Body femur_l: mass=9.3424 mass_center=(0 -0.1710809 0) inertia=(0.1765 0.0362015 0.1765 0 0 0) meshes=femur_l.vtp
      WrapEllipsoid AB_at_femshaft_l: xyz_body_rotation=(-0.1117011 0 0.1762782) translation=(0.0154 -0.1236 -0.0269)
          quadrant=all dimensions=(0.0174 0.0738 0.0222)
      WrapEllipsoid AL_at_femshaft_l: xyz_body_rotation=(-0.1117011 0 0.05410521) translation=(0.0326 -0.2511 -0.0126)
          quadrant=all dimensions=(0.0212 0.1055 0.019)
      WrapEllipsoid AMprox_at_femshaft_l: xyz_body_rotation=(-0.1117011 0 0.2111848)
          translation=(0.0063 -0.0819 -0.0315) quadrant=all dimensions=(0.0223 0.0738 0.0338)
      WrapEllipsoid AMmid_at_femshaft_l: xyz_body_rotation=(-0.1117011 0 0.1239184)
          translation=(0.0243 -0.1695 -0.0217) quadrant=all dimensions=(0.0226 0.1266 0.0327)
      WrapEllipsoid AMdist_at_femshaft_l: xyz_body_rotation=(-0.1117011 0 0.1762782)
          translation=(0.0324 -0.2751 -0.0099) quadrant=all dimensions=(0.023 0.211 0.0227)
      WrapEllipsoid AMisch_at_condyles_l: xyz_body_rotation=(-0.1117011 0 -0.434587)
          translation=(-0.0302 -0.3977 0.0039) quadrant=all dimensions=(0.0527 0.2532 0.0424)
      WrapEllipsoid PECT_at_femshaft_l: xyz_body_rotation=(-0.1117011 0 0.2111848) translation=(0.008 -0.09 -0.0306)
          quadrant=all dimensions=(0.0175 0.0527 0.0138)
      WrapCylinder KnExt_at_fem_l: xyz_body_rotation=(0.06230825 -0.05078908 -0.8925614)
          translation=(0.0038 -0.4248 -0.0022) quadrant=all radius=0.0264 length=0.1055
      WrapEllipsoid Gastroc_at_Condyles_l: xyz_body_rotation=(-0.05899213 0.09372418 0.02321288)
          translation=(0.0051 -0.4299 -0.0003) quadrant=all dimensions=(0.0316 0.0264 0.0527)
    Body tibia_l: mass=2.99427 mass_center=(0 -0.1734301 0) inertia=(0.0282157 0.00485045 0.0293745 0 0 0)
        meshes=(tibia_l.vtp fibula_l.vtp)
      WrapEllipsoid GR_at_condyles_l: xyz_body_rotation=(0 0 -0.1832596) translation=(0 0 0) quadrant=all
          dimensions=(0.0364 0.0641 0.0538)
      WrapEllipsoid SM_at_condyles_l: xyz_body_rotation=(0 0 -0.296706) translation=(0 0 0) quadrant=all
          dimensions=(0.0356 0.0608 0.0494)
      WrapEllipsoid ST_at_condyles_l: xyz_body_rotation=(0 0 -0.270526) translation=(0 0 0) quadrant=all
          dimensions=(0.0429 0.0697 0.0578)
      WrapCylinder BFLH_at_gastroc_l: translation=(-0.0319 -0.0447 0) quadrant=y radius=0.0101 length=0.101
      WrapCylinder Gastroc_at_Shank_l: xyz_body_rotation=(-2.967234 -0.02897247 -1.478119)
          translation=(-0.0075 -0.0747 0.0033) quadrant=-y radius=0.0556 length=0.101
    Body patella_l: mass=0.4494863 mass_center=(0.001899 0.027852 0) inertia=(1.64198e-5 7.59414e-5 7.59414e-5 0 0 0)
        meshes=patella_l.vtp
    Body talus_l: mass=0.04149104 mass_center=(0.005555 0.002323 0) inertia=(2.8217e-6 9.406e-7 2.8217e-6 0 0 0)
        meshes=talus_lv.vtp
    Body calcn_l: mass=1.138699 mass_center=(0.1051756 0.016107 0) inertia=(0.00124734 0.00317388 0.00368008 0 0 0)
        meshes=(calcaneous_lv.vtp navicular_lv.vtp cuboid_lv.vtp first_cuneiform_lv.vtp second_cuneiform_lv.vtp third_cuneiform_lv.vtp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)
    Body toes_l: mass=0.1820996 mass_center=(0.03169775 -0.0026845 -0.010841)
        inertia=(0.000198552 0.000508174 0.000584842 0 0 0)
        meshes=(prox_phalanx1_lvs.vtp prox_phalanx2_lvs.vtp prox_phalanx3_lvs.vtp prox_phalanx4_lvs.vtp prox_phalanx5_lvs.vtp mid_phalanx2_lvs.vtp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)
    Body tibia_r: mass=2.99427 mass_center=(0 -0.1734301 0) inertia=(0.0282157 0.00485045 0.0293745 0 0 0)
      WrapEllipsoid GR_at_condyles_r: xyz_body_rotation=(0 0 -0.1832596) translation=(0 0 0) quadrant=all
          dimensions=(0.0364 0.0641 0.0538)
      WrapEllipsoid SM_at_condyles_r: xyz_body_rotation=(0 0 -0.296706) translation=(0 0 0) quadrant=all
          dimensions=(0.0356 0.0608 0.0494)
      WrapEllipsoid ST_at_condyles_r: xyz_body_rotation=(0 0 -0.270526) translation=(0 0 0) quadrant=all
          dimensions=(0.0429 0.0697 0.0578)
      WrapCylinder BFLH_at_gastroc_r: translation=(-0.0319 -0.0447 0) quadrant=y radius=0.0101 length=0.101
      WrapCylinder Gastroc_at_Shank_r: xyz_body_rotation=(2.967234 0.02897247 -1.478119)
          translation=(-0.0075 -0.0747 -0.0033) quadrant=-y radius=0.0556 length=0.101
    Body talus_r: mass=0.04149104 mass_center=(0.005555 0.002323 0) inertia=(2.8217e-6 9.406e-7 2.8217e-6 0 0 0)
        meshes=talus_rv.vtp
    Body calcn_r: mass=1.138699 mass_center=(0.1051756 0.016107 0) inertia=(0.00124734 0.00317388 0.00368008 0 0 0)
        meshes=(calcaneous_rv.vtp navicular_rv.vtp cuboid_rv.vtp first_cuneiform_rv.vtp second_cuneiform_rv.vtp third_cuneiform_rv.vtp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)
    Body toes_r: mass=0.1820996 mass_center=(0.03169775 -0.0026845 0.010841)
        inertia=(0.000198552 0.000508174 0.000584842 0 0 0)
        meshes=(prox_phalanx1_rvs.vtp prox_phalanx2_rvs.vtp prox_phalanx3_rvs.vtp prox_phalanx4_rvs.vtp prox_phalanx5_rvs.vtp mid_phalanx2_rvs.vtp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)
  JointSet:
    CustomJoint gnd_pelvis: socket_parent_frame=ground_offset socket_child_frame=pelvis_offset
      Coordinate pelvis_tilt: default_value=0 range=(-4.712389 4.712389) clamped=false
      Coordinate pelvis_list: default_value=0 range=(-4.712389 4.712389) clamped=false
      Coordinate pelvis_rot: default_value=0 range=(-4.712389 4.712389) clamped=false
      Coordinate pelvis_tx: default_value=0 range=(-10 10) clamped=false
      Coordinate pelvis_ty: default_value=0.969 range=(-10 10) clamped=false
      Coordinate pelvis_tz: default_value=0 range=(-10 10) clamped=false
      PhysicalOffsetFrame ground_offset: socket_parent=/ground translation=(0 0 0) [meters]
      PhysicalOffsetFrame pelvis_offset: socket_parent=/bodyset/pelvis translation=(0 0 0)
      SpatialTransform:
        TransformAxis rotation1: coordinates=pelvis_tilt axis=(0 0 1) LinearFunction(coefficients=1 0)
        TransformAxis rotation2: coordinates=pelvis_list axis=(1 0 0) LinearFunction(coefficients=1 0)
        TransformAxis rotation3: coordinates=pelvis_rot axis=(0 1 0) LinearFunction(coefficients=1 0)
        TransformAxis translation1: coordinates=pelvis_tx axis=(1 0 0) LinearFunction(coefficients=1 0)
        TransformAxis translation2: coordinates=pelvis_ty axis=(0 1 0) LinearFunction(coefficients=1 0)
        TransformAxis translation3: coordinates=pelvis_tz axis=(0 0 1) LinearFunction(coefficients=1 0)
    CustomJoint pelvis_torso: socket_parent_frame=pelvis_offset socket_child_frame=torso_offset
      Coordinate lumbar_ext: default_value=0 range=(-1.047198 1.047198) clamped=true
      Coordinate lumbar_latbend: default_value=0 range=(-1.047198 1.047198) clamped=true
      Coordinate lumbar_rot: default_value=0 range=(-1.047198 1.047198) clamped=true
      PhysicalOffsetFrame pelvis_offset: socket_parent=/bodyset/pelvis translation=(-0.096295 0.052963 0)
      PhysicalOffsetFrame torso_offset: socket_parent=/bodyset/torso translation=(0 0 0)
      SpatialTransform: axes_held_at_zero=(translation1 translation2 translation3)
        TransformAxis rotation1: coordinates=lumbar_ext axis=(0 0 1) LinearFunction(coefficients=1 0)
        TransformAxis rotation2: coordinates=lumbar_latbend axis=(1 0 0) LinearFunction(coefficients=1 0)
        TransformAxis rotation3: coordinates=lumbar_rot axis=(0 1 0) LinearFunction(coefficients=1 0)
    CustomJoint torso_neckhead: socket_parent_frame=torso_offset socket_child_frame=neckhead_offset
      Coordinate neck_ext: default_value=0 range=(-0.8726646 1.256637) clamped=true
      Coordinate neck_latbend: default_value=0 range=(-0.6981317 0.6981317) clamped=true
      Coordinate neck_rot: default_value=0 range=(-1.151917 1.151917) clamped=true
      PhysicalOffsetFrame torso_offset: socket_parent=/bodyset/torso translation=(-0.020724 0.36774 0)
      PhysicalOffsetFrame neckhead_offset: socket_parent=/bodyset/neckhead translation=(0 0 0)
      SpatialTransform: axes_held_at_zero=(translation1 translation2 translation3)
        TransformAxis rotation1: coordinates=neck_ext axis=(0 0 1) LinearFunction(coefficients=1 0)
        TransformAxis rotation2: coordinates=neck_latbend axis=(1 0 0) LinearFunction(coefficients=1 0)
        TransformAxis rotation3: coordinates=neck_rot axis=(0 1 0) LinearFunction(coefficients=1 0)
    CustomJoint acromial_r: socket_parent_frame=torso_offset socket_child_frame=humerus_r_offset
      Coordinate arm_add_r: default_value=0 range=(-2.094395 1.570796) clamped=true
      Coordinate arm_flex_r: default_value=0 range=(-1.570796 1.570796) clamped=true
      Coordinate arm_rot_r: default_value=0 range=(-1.570796 1.570796) clamped=true
      PhysicalOffsetFrame torso_offset: socket_parent=/bodyset/torso translation=(-0.023017 0.341119 0.163003)
      PhysicalOffsetFrame humerus_r_offset: socket_parent=/bodyset/humerus_r translation=(0 0 0)
      SpatialTransform: axes_held_at_zero=(translation1 translation2 translation3)
        TransformAxis rotation1: coordinates=arm_add_r axis=(1 0 0) LinearFunction(coefficients=1 0)
        TransformAxis rotation2: coordinates=arm_flex_r axis=(0 0 1) LinearFunction(coefficients=1 0)
        TransformAxis rotation3: coordinates=arm_rot_r axis=(0 1 0) LinearFunction(coefficients=1 0)
    CustomJoint elbow_r: socket_parent_frame=humerus_r_offset socket_child_frame=ulna_r_offset
      Coordinate elbow_flex_r: default_value=0 range=(0 2.792527) clamped=true
      PhysicalOffsetFrame humerus_r_offset: socket_parent=/bodyset/humerus_r translation=(0.013742 -0.299295 -0.010031)
      PhysicalOffsetFrame ulna_r_offset: socket_parent=/bodyset/ulna_r translation=(0 0 0)
      SpatialTransform: axes_held_at_zero=(rotation2 rotation3 translation1 translation2 translation3)
        TransformAxis rotation1: coordinates=elbow_flex_r axis=(0.226047 0.022269 0.9738618)
            LinearFunction(coefficients=1 0)
    CustomJoint radioulnar_r: socket_parent_frame=ulna_r_offset socket_child_frame=radius_r_offset
      Coordinate pro_sup_r: default_value=1.047198 range=(0 1.570796) clamped=true
      PhysicalOffsetFrame ulna_r_offset: socket_parent=/bodyset/ulna_r translation=(-0.006953 -0.013443 0.026958)
      PhysicalOffsetFrame radius_r_offset: socket_parent=/bodyset/radius_r translation=(0 0 0)
      SpatialTransform: axes_held_at_zero=(rotation1 rotation3 translation1 translation2 translation3)
        TransformAxis rotation2: coordinates=pro_sup_r axis=(0.05639803 0.9984065 0.001952001)
            LinearFunction(coefficients=1 0)
    CustomJoint radius_hand_r: socket_parent_frame=radius_r_offset socket_child_frame=hand_r_offset
      Coordinate wrist_flex_r: default_value=0 range=(-1.22173 1.22173) clamped=true
      PhysicalOffsetFrame radius_r_offset: socket_parent=/bodyset/radius_r translation=(-0.009092 -0.243754 0.014067)
      PhysicalOffsetFrame hand_r_offset: socket_parent=/bodyset/hand_r translation=(0 0 0)
      SpatialTransform: axes_held_at_zero=(rotation2 rotation3 translation1 translation2 translation3)
        TransformAxis rotation1: coordinates=wrist_flex_r axis=(0 0 1) LinearFunction(coefficients=1 0)
    CustomJoint acromial_l: socket_parent_frame=torso_offset socket_child_frame=humerus_l_offset
      Coordinate arm_add_l: default_value=0 range=(-2.094395 1.570796) clamped=true
      Coordinate arm_flex_l: default_value=0 range=(-1.570796 1.570796) clamped=true
      Coordinate arm_rot_l: default_value=0 range=(-1.570796 1.570796) clamped=true
      PhysicalOffsetFrame torso_offset: socket_parent=/bodyset/torso translation=(-0.023017 0.341119 -0.163003)
      PhysicalOffsetFrame humerus_l_offset: socket_parent=/bodyset/humerus_l translation=(0 0 0)
      SpatialTransform: axes_held_at_zero=(translation1 translation2 translation3)
        TransformAxis rotation1: coordinates=arm_add_l axis=(-1 0 0) LinearFunction(coefficients=1 0)
        TransformAxis rotation2: coordinates=arm_flex_l axis=(0 0 1) LinearFunction(coefficients=1 0)
        TransformAxis rotation3: coordinates=arm_rot_l axis=(0 -1 0) LinearFunction(coefficients=1 0)
    CustomJoint elbow_l: socket_parent_frame=humerus_l_offset socket_child_frame=ulna_l_offset
      Coordinate elbow_flex_l: default_value=0 range=(0 2.792527) clamped=true
      PhysicalOffsetFrame humerus_l_offset: socket_parent=/bodyset/humerus_l translation=(0.013742 -0.299295 0.010031)
      PhysicalOffsetFrame ulna_l_offset: socket_parent=/bodyset/ulna_l translation=(0 0 0)
      SpatialTransform: axes_held_at_zero=(rotation2 rotation3 translation1 translation2 translation3)
        TransformAxis rotation1: coordinates=elbow_flex_l axis=(-0.226047 -0.022269 0.9738618)
            LinearFunction(coefficients=1 0)
    CustomJoint radioulnar_l: socket_parent_frame=ulna_l_offset socket_child_frame=radius_l_offset
      Coordinate pro_sup_l: default_value=1.047198 range=(0 1.570796) clamped=true
      PhysicalOffsetFrame ulna_l_offset: socket_parent=/bodyset/ulna_l translation=(-0.006953 -0.013443 -0.026958)
      PhysicalOffsetFrame radius_l_offset: socket_parent=/bodyset/radius_l translation=(0 0 0)
      SpatialTransform: axes_held_at_zero=(rotation1 rotation3 translation1 translation2 translation3)
        TransformAxis rotation2: coordinates=pro_sup_l axis=(-0.05639803 -0.9984065 0.001952001)
            LinearFunction(coefficients=1 0)
    CustomJoint radius_hand_l: socket_parent_frame=radius_l_offset socket_child_frame=hand_l_offset
      Coordinate wrist_flex_l: default_value=0 range=(-1.22173 1.22173) clamped=true
      PhysicalOffsetFrame radius_l_offset: socket_parent=/bodyset/radius_l translation=(-0.009092 -0.243754 -0.014067)
      PhysicalOffsetFrame hand_l_offset: socket_parent=/bodyset/hand_l translation=(0 0 0)
      SpatialTransform: axes_held_at_zero=(rotation2 rotation3 translation1 translation2 translation3)
        TransformAxis rotation1: coordinates=wrist_flex_l axis=(0 0 1) LinearFunction(coefficients=1 0)
    CustomJoint hip_r: socket_parent_frame=pelvis_offset socket_child_frame=femur_r_offset
      Coordinate hip_flex_r: default_value=0 range=(-1.047198 2.617994) clamped=true
      Coordinate hip_add_r: default_value=0 range=(-1.047198 1.047198) clamped=true
      Coordinate hip_rot_r: default_value=0 range=(-1.047198 1.047198) clamped=true
      PhysicalOffsetFrame pelvis_offset: socket_parent=/bodyset/pelvis translation=(-0.054191 -0.075582 0.074398)
      PhysicalOffsetFrame femur_r_offset: socket_parent=/bodyset/femur_r translation=(0 0 0)
      SpatialTransform: axes_held_at_zero=(translation1 translation2 translation3)
        TransformAxis rotation1: coordinates=hip_flex_r axis=(0 0 1) LinearFunction(coefficients=1 0)
        TransformAxis rotation2: coordinates=hip_add_r axis=(1 0 0) LinearFunction(coefficients=1 0)
        TransformAxis rotation3: coordinates=hip_rot_r axis=(0 1 0) LinearFunction(coefficients=1 0)
    WeldJoint femur_femur: socket_parent_frame=femur_r_offset socket_child_frame=femur_distal_r_offset
      PhysicalOffsetFrame femur_r_offset: socket_parent=/bodyset/femur_r translation=(-0.00633 -0.426668 -0.001335)
      PhysicalOffsetFrame femur_distal_r_offset: socket_parent=/bodyset/femur_distal_r translation=(0 0 0)
    CustomJoint knee_r: socket_parent_frame=femur_distal_r_offset socket_child_frame=tibia_proximal_r_offset
      Coordinate knee_flex_r: default_value=3.469715e-5 range=(-0.1745329 2.792527) clamped=true
      Coordinate knee_add_r: default_value=-0.07151012 range=(-0.8726646 0.8726646) clamped=true
      Coordinate knee_rot_r: default_value=-0.01673704 range=(-0.8726646 0.8726646) clamped=true
      Coordinate knee_tx_r: default_value=-0.004326 range=(-0.211 0.211) clamped=true
      Coordinate knee_ty_r: default_value=0.007976 range=(-0.5275 1.266) clamped=true
      Coordinate knee_tz_r: default_value=-0.009608 range=(-0.211 0.211) clamped=true
      PhysicalOffsetFrame femur_distal_r_offset: socket_parent=/bodyset/femur_distal_r translation=(0 0 0)
      PhysicalOffsetFrame tibia_proximal_r_offset: socket_parent=/bodyset/tibia_proximal_r translation=(0 0 0)
      SpatialTransform:
        TransformAxis rotation1: coordinates=knee_flex_r axis=(0 0 1) LinearFunction(coefficients=-1 0)
        TransformAxis rotation2: coordinates=knee_add_r axis=(1 0 0) LinearFunction(coefficients=1 0)
        TransformAxis rotation3: coordinates=knee_rot_r axis=(0 1 0) LinearFunction(coefficients=1 0)
        TransformAxis translation1: coordinates=knee_tx_r axis=(1 0 0) LinearFunction(coefficients=1 0)
        TransformAxis translation2: coordinates=knee_ty_r axis=(0 1 0) LinearFunction(coefficients=1 0)
        TransformAxis translation3: coordinates=knee_tz_r axis=(0 0 1) LinearFunction(coefficients=1 0)
    CustomJoint pf_r: socket_parent_frame=femur_distal_r_offset socket_child_frame=patella_com_r_offset
      Coordinate pf_flex_r: default_value=0.1616177 range=(-1.570796 1.570796) clamped=true
      Coordinate pf_rot_r: default_value=-0.05730125 range=(-1.570796 1.570796) clamped=true
      Coordinate pf_tilt_r: default_value=0.0006190508 range=(-0.8726646 0.8726646) clamped=true
      Coordinate pf_tx_r: default_value=0.055406 range=(-0.211 0.211) clamped=true
      Coordinate pf_ty_r: default_value=0.026592 range=(-0.211 0.211) clamped=true
      Coordinate pf_tz_r: default_value=-0.000885 range=(-0.211 0.211) clamped=true
      PhysicalOffsetFrame femur_distal_r_offset: socket_parent=/bodyset/femur_distal_r translation=(0 0 0)
      PhysicalOffsetFrame patella_com_r_offset: socket_parent=/bodyset/patella_com_r translation=(0 0 0)
      SpatialTransform:
        TransformAxis rotation1: coordinates=pf_flex_r axis=(0 0 1) LinearFunction(coefficients=-1 0)
        TransformAxis rotation2: coordinates=pf_rot_r axis=(1 0 0) LinearFunction(coefficients=1 0)
        TransformAxis rotation3: coordinates=pf_tilt_r axis=(0 1 0) LinearFunction(coefficients=1 0)
        TransformAxis translation1: coordinates=pf_tx_r axis=(1 0 0) LinearFunction(coefficients=1 0)
        TransformAxis translation2: coordinates=pf_ty_r axis=(0 1 0) LinearFunction(coefficients=1 0)
        TransformAxis translation3: coordinates=pf_tz_r axis=(0 0 1) LinearFunction(coefficients=1 0)
    WeldJoint patella_com_patella_r: socket_parent_frame=patella_com_r_offset socket_child_frame=patella_r_offset
      PhysicalOffsetFrame patella_com_r_offset: socket_parent=/bodyset/patella_com_r translation=(0.000101 -0.018345 0)
      PhysicalOffsetFrame patella_r_offset: socket_parent=/bodyset/patella_r translation=(0 0 0)
    CustomJoint hip_l: socket_parent_frame=pelvis_offset socket_child_frame=femur_l_offset
      Coordinate hip_flex_l: default_value=0 range=(-1.047198 2.617994) clamped=true
      Coordinate hip_add_l: default_value=0 range=(-1.047198 0.3490659) clamped=true
      Coordinate hip_rot_l: default_value=0 range=(-1.047198 1.047198) clamped=true
      PhysicalOffsetFrame pelvis_offset: socket_parent=/bodyset/pelvis translation=(-0.054191 -0.075582 -0.074398)
      PhysicalOffsetFrame femur_l_offset: socket_parent=/bodyset/femur_l translation=(0 0 0)
      SpatialTransform: axes_held_at_zero=(translation1 translation2 translation3)
        TransformAxis rotation1: coordinates=hip_flex_l axis=(0 0 1) LinearFunction(coefficients=1 0)
        TransformAxis rotation2: coordinates=hip_add_l axis=(1 0 0) LinearFunction(coefficients=1 0)
        TransformAxis rotation3: coordinates=hip_rot_l axis=(0 1 0) LinearFunction(coefficients=1 0)
    CustomJoint knee_l: socket_parent_frame=femur_l_offset socket_child_frame=tibia_l_offset
      Coordinate knee_flex_l: default_value=0 range=(-0.1745329 2.792527) clamped=true
      PhysicalOffsetFrame femur_l_offset: socket_parent=/bodyset/femur_l translation=(0 0 0)
      PhysicalOffsetFrame tibia_l_offset: socket_parent=/bodyset/tibia_l translation=(0 0 0)
      SpatialTransform:
        TransformAxis rotation1: coordinates=knee_flex_l axis=(0 0 1) LinearFunction(coefficients=-1 0)
        TransformAxis rotation2: coordinates=knee_flex_l axis=(1 0 0)
          SimmSpline: x=(-0.174533 0 0.174533 0.349066 0.523599 0.698132 0.872665 1.0472 1.22173 1.39626 1.5708 1.74533 1.91986 2.0944)
              y=(0.00498946 0 -0.00605682 -0.0127056 -0.0193932 -0.025694 -0.0313393 -0.0362354 -0.0404783 -0.044365 -0.0484046 -0.0533308 -0.0601155 -0.0699935)
        TransformAxis rotation3: coordinates=knee_flex_l axis=(0 1 0)
          SimmSpline: x=(-0.174533 0 0.174533 0.349066 0.523599 0.698132 0.872665 1.0472 1.22173 1.39626 1.5708 1.74533 1.91986 2.0944)
              y=(0.0568237 0 -0.0473143 -0.0858667 -0.116487 -0.140093 -0.157672 -0.170252 -0.178879 -0.184595 -0.18842 -0.191344 -0.194325 -0.198293)
        TransformAxis translation1: coordinates=knee_flex_l axis=(1 0 0)
          SimmSpline: x=(-0.174533 0 0.174533 0.349066 0.523599 0.698132 0.872665 1.0472 1.22173 1.39626 1.5708 1.74533 1.91986 2.0944)
              y=(-0.001741 0 0.001623 0.002957 0.003863 0.00424 0.004023 0.003197 0.001786 -0.00014 -0.002486 -0.005122 -0.00791 -0.01071)
        TransformAxis translation2: coordinates=knee_flex_l axis=(0 1 0)
          SimmSpline: x=(-0.174533 0 0.174533 0.349066 0.523599 0.698132 0.872665 1.0472 1.22173 1.39626 1.5708 1.74533 1.91986 2.0944)
              y=(-0.426177 -0.426668 -0.427781 -0.429444 -0.431548 -0.433956 -0.436515 -0.43906 -0.441438 -0.443505 -0.445147 -0.446283 -0.446875 -0.446924)
        TransformAxis translation3: coordinates=knee_flex_l axis=(0 0 1)
          SimmSpline: x=(-0.174533 0 0.174533 0.349066 0.523599 0.698132 0.872665 1.0472 1.22173 1.39626 1.5708 1.74533 1.91986 2.0944)
              y=(0.00087 0.001335 0.001803 0.002248 0.002652 0.003007 0.003305 0.003548 0.00374 0.003885 0.003991 0.004064 0.004112 0.004139)
    CustomJoint pf_l: socket_parent_frame=femur_l_offset socket_child_frame=patella_l_offset
      Coordinate pf_l_r3: default_value=0.001136855 range=(-99999.9 99999.9) clamped=false
      Coordinate pf_l_tx: default_value=0.046789 range=(-99999.9 99999.9) clamped=false
      Coordinate pf_l_ty: default_value=-0.441741 range=(-99999.9 99999.9) clamped=false
      PhysicalOffsetFrame femur_l_offset: socket_parent=/bodyset/femur_l translation=(0 0 0)
      PhysicalOffsetFrame patella_l_offset: socket_parent=/bodyset/patella_l translation=(0 0 0)
      SpatialTransform: axes_held_at_zero=(rotation2 rotation3 translation3)
        TransformAxis rotation1: coordinates=pf_l_r3 axis=(0 0 1) LinearFunction(coefficients=1 0)
        TransformAxis translation1: coordinates=pf_l_tx axis=(1 0 0) LinearFunction(coefficients=1 0)
        TransformAxis translation2: coordinates=pf_l_ty axis=(0 1 0) LinearFunction(coefficients=1 0)
    CustomJoint ankle_l: socket_parent_frame=tibia_l_offset socket_child_frame=talus_l_offset
      Coordinate ankle_flex_l: default_value=0 range=(-1.570796 1.570796) clamped=true
      PhysicalOffsetFrame tibia_l_offset: socket_parent=/bodyset/tibia_l translation=(-0.0101 -0.404 0)
      PhysicalOffsetFrame talus_l_offset: socket_parent=/bodyset/talus_l translation=(0 0 0)
      SpatialTransform: axes_held_at_zero=(rotation2 rotation3 translation1 translation2 translation3)
        TransformAxis rotation1: coordinates=ankle_flex_l axis=(-0.105014 -0.1740221 0.9791263)
            LinearFunction(coefficients=1 0)
    CustomJoint subtalar_l: socket_parent_frame=talus_l_offset socket_child_frame=calcn_l_offset
      Coordinate subt_angle_l: default_value=0 range=(-0.6981317 0.6981317) clamped=true
      PhysicalOffsetFrame talus_l_offset: socket_parent=/bodyset/talus_l translation=(-0.049258 -0.042369 0.007999)
      PhysicalOffsetFrame calcn_l_offset: socket_parent=/bodyset/calcn_l translation=(0 0 0)
      SpatialTransform: axes_held_at_zero=(rotation2 rotation3 translation1 translation2 translation3)
        TransformAxis rotation1: coordinates=subt_angle_l axis=(0.78718 0.604747 -0.120949)
            LinearFunction(coefficients=1 0)
    CustomJoint mtp_l: socket_parent_frame=calcn_l_offset socket_child_frame=toes_l_offset
      Coordinate mtp_angle_l: default_value=0 range=(-1.047198 1.047198) clamped=true
      PhysicalOffsetFrame calcn_l_offset: socket_parent=/bodyset/calcn_l translation=(0.184611 -0.002065 0.001115)
      PhysicalOffsetFrame toes_l_offset: socket_parent=/bodyset/toes_l translation=(0 0 0)
      SpatialTransform: axes_held_at_zero=(rotation2 rotation3 translation1 translation2 translation3)
        TransformAxis rotation1: coordinates=mtp_angle_l axis=(0.5809542 0 -0.8139363) LinearFunction(coefficients=1 0)
    WeldJoint tibia_tibia: socket_parent_frame=tibia_proximal_r_offset socket_child_frame=tibia_r_offset
      PhysicalOffsetFrame tibia_proximal_r_offset: socket_parent=/bodyset/tibia_proximal_r translation=(0 0 0)
      PhysicalOffsetFrame tibia_r_offset: socket_parent=/bodyset/tibia_r translation=(0 0 0)
    CustomJoint ankle_r: socket_parent_frame=tibia_r_offset socket_child_frame=talus_r_offset
      Coordinate ankle_flex_r: default_value=0 range=(-1.570796 1.570796) clamped=true
      PhysicalOffsetFrame tibia_r_offset: socket_parent=/bodyset/tibia_r translation=(-0.0101 -0.404 0)
      PhysicalOffsetFrame talus_r_offset: socket_parent=/bodyset/talus_r translation=(0 0 0)
      SpatialTransform: axes_held_at_zero=(rotation2 rotation3 translation1 translation2 translation3)
        TransformAxis rotation1: coordinates=ankle_flex_r axis=(-0.105014 -0.1740221 0.9791263)
            LinearFunction(coefficients=1 0)
    CustomJoint subtalar_r: socket_parent_frame=talus_r_offset socket_child_frame=calcn_r_offset
      Coordinate subt_angle_r: default_value=0 range=(-1.047198 1.047198) clamped=true
      PhysicalOffsetFrame talus_r_offset: socket_parent=/bodyset/talus_r translation=(-0.049258 -0.042369 0.007999)
      PhysicalOffsetFrame calcn_r_offset: socket_parent=/bodyset/calcn_r translation=(0 0 0)
      SpatialTransform: axes_held_at_zero=(rotation2 rotation3 translation1 translation2 translation3)
        TransformAxis rotation1: coordinates=subt_angle_r axis=(0.78718 0.604747 -0.120949)
            LinearFunction(coefficients=1 0)
    CustomJoint mtp_r: socket_parent_frame=calcn_r_offset socket_child_frame=toes_r_offset
      Coordinate mtp_angle_r: default_value=0 range=(-1.047198 1.047198) clamped=true
      PhysicalOffsetFrame calcn_r_offset: socket_parent=/bodyset/calcn_r translation=(0.184611 -0.002065 0.001115)
      PhysicalOffsetFrame toes_r_offset: socket_parent=/bodyset/toes_r translation=(0 0 0)
      SpatialTransform: axes_held_at_zero=(rotation2 rotation3 translation1 translation2 translation3)
        TransformAxis rotation1: coordinates=mtp_angle_r axis=(0.5809542 0 -0.8139363) LinearFunction(coefficients=1 0)
  ConstraintSet:
    CoordinateCouplerConstraint pf_l_r3_con: independent_coordinate_names=knee_flex_l dependent_coordinate_name=pf_l_r3
      coupled_coordinates_function: SimmSpline: x=(0 0.174533 0.349066 0.523599 0.698132 0.872665 1.0472 1.22173 1.39626 1.5708 1.74533 1.91986 2.0944)
          y=(0.00113686 -0.00629212 -0.105582 -0.253683 -0.414245 -0.579047 -0.747244 -0.91799 -1.09044 -1.26379 -1.43763 -1.61186 -1.78634)
    CoordinateCouplerConstraint pf_l_tx_con: independent_coordinate_names=knee_flex_l dependent_coordinate_name=pf_l_tx
      coupled_coordinates_function: SimmSpline: x=(0 0.174533 0.349066 0.523599 0.698132 0.872665 1.0472 1.22173 1.39626 1.5708 1.74533 1.91986 2.0944)
          y=(0.046789 0.04293 0.037538 0.030608 0.022654 0.014267 0.005785 -0.002545 -0.010507 -0.017833 -0.024187 -0.029265 -0.03251)
    CoordinateCouplerConstraint pf_l_ty_con: independent_coordinate_names=knee_flex_l dependent_coordinate_name=pf_l_ty
      coupled_coordinates_function: SimmSpline: x=(0 0.174533 0.349066 0.523599 0.698132 0.872665 1.0472 1.22173 1.39626 1.5708 1.74533 1.91986 2.0944)
          y=(-0.441741 -0.450448 -0.458102 -0.46436 -0.469071 -0.472107 -0.473404 -0.472996 -0.470902 -0.467181 -0.462127 -0.456233 -0.450097)
  ForceSet:
    Millard2012EquilibriumMuscle addbrev_r: min_control=0.01 max_control=1 max_isometric_force=303.7
        optimal_fiber_length=0.10972 tendon_slack_length=0.03831 pennation_angle_at_optimal=0.1064651
      PathPoint: pelvis (-0.01771 -0.08716 0.01428)
      PathPoint pathpoint_0: femur_r (-0.00223 -0.13134 0.02771)
    Millard2012EquilibriumMuscle addlong_r: min_control=0.01 max_control=1 max_isometric_force=399.5
        optimal_fiber_length=0.11914 tendon_slack_length=0.14314 pennation_angle_at_optimal=0.1235693
      PathPoint: pelvis (-0.00703 -0.08244 0.01751)
      PathPoint pathpoint_0: femur_r (0.01253 -0.26642 0.01762)
    Millard2012EquilibriumMuscle addmagProx_r: min_control=0.01 max_control=1 max_isometric_force=324.2
        optimal_fiber_length=0.10938 tendon_slack_length=0.04454 pennation_angle_at_optimal=0.3872886
      PathPoint: pelvis (-0.02873 -0.09973 0.01266)
      PathPoint pathpoint_0: femur_r (-0.017 -0.08777 0.03564)
    Millard2012EquilibriumMuscle addmagMid_r: min_control=0.01 max_control=1 max_isometric_force=324.2
        optimal_fiber_length=0.15487 tendon_slack_length=0.05398 pennation_angle_at_optimal=0.2567379
      PathPoint: pelvis (-0.04883 -0.11197 0.02646)
      PathPoint pathpoint_0: femur_r (0.00269 -0.18076 0.03252)
    Millard2012EquilibriumMuscle addmagDist_r: min_control=0.01 max_control=1 max_isometric_force=324.2
        optimal_fiber_length=0.20231 tendon_slack_length=0.10276 pennation_angle_at_optimal=0.2412045
      PathPoint: pelvis (-0.06866 -0.11839 0.03692)
      PathPoint pathpoint_0: femur_r (0.01252 -0.29217 0.02148)
    Millard2012EquilibriumMuscle addmagIsch_r: min_control=0.01 max_control=1 max_isometric_force=324.2
        optimal_fiber_length=0.1778 tendon_slack_length=0.25156 pennation_angle_at_optimal=0.2073451
      PathPoint: pelvis (-0.0831 -0.12032 0.03868)
      PathPoint pathpoint_0: femur_r (0.00535 -0.43182 -0.04243)
    Millard2012EquilibriumMuscle bflh_r: min_control=0.01 max_control=1 max_isometric_force=705.2
        optimal_fiber_length=0.10919 tendon_slack_length=0.36022 pennation_angle_at_optimal=0.2021091
      PathPoint: pelvis (-0.09644 -0.11044 0.05434)
      PathPoint pathpoint_0: tibia_r (-0.01633 -0.04736 0.04198)
    Millard2012EquilibriumMuscle bfsh_r: min_control=0.01 max_control=1 max_isometric_force=631.6
        optimal_fiber_length=0.12066 tendon_slack_length=0.11377 pennation_angle_at_optimal=0.2151991
      PathPoint: femur_r (0.00557 -0.23496 0.02604)
      PathPoint pathpoint_0: tibia_r (-0.01469 -0.04675 0.04044)
    Millard2012EquilibriumMuscle edl_r: min_control=0.01 max_control=1 max_isometric_force=345.4
        optimal_fiber_length=0.07188 tendon_slack_length=0.38099 pennation_angle_at_optimal=0.1890192
      PathPoint: tibia_r (-0.01632 -0.11803 0.02091)
      PathPoint pathpoint_0: tibia_r (0.01673 -0.38356 0.01143)
      PathPoint pathpoint_1: calcn_r (0.09797 0.03838 0.00085)
      PathPoint pathpoint_2: calcn_r (0.17227 0.00586 0.01386)
      PathPoint pathpoint_3: toes_r (0.00032 0.00501 0.01631)
      PathPoint pathpoint_4: toes_r (0.04723 -0.00043 0.02665)
    Millard2012EquilibriumMuscle ehl_r: min_control=0.01 max_control=1 max_isometric_force=165
        optimal_fiber_length=0.07776 tendon_slack_length=0.34464 pennation_angle_at_optimal=0.1647591
      PathPoint: tibia_r (-0.01428 -0.15812 0.01928)
      PathPoint pathpoint_0: tibia_r (0.00714 -0.29675 0.01673)
      PathPoint pathpoint_1: tibia_r (0.0204 -0.37672 -0.00286)
      PathPoint pathpoint_2: calcn_r (0.10341 0.04147 -0.02249)
      PathPoint pathpoint_3: calcn_r (0.13784 0.03294 -0.0274)
      PathPoint pathpoint_4: calcn_r (0.18485 0.01482 -0.02985)
      PathPoint pathpoint_5: toes_r (0.03177 0.00437 -0.02612)
      PathPoint pathpoint_6: toes_r (0.06002 0.00362 -0.01983)
    Millard2012EquilibriumMuscle fdl_r: min_control=0.01 max_control=1 max_isometric_force=274.4
        optimal_fiber_length=0.04633 tendon_slack_length=0.39236 pennation_angle_at_optimal=0.2380629
      PathPoint: tibia_r (-0.00235 -0.18688 -0.00184)
      PathPoint pathpoint_0: tibia_r (-0.01795 -0.37183 -0.01265)
      PathPoint pathpoint_1: calcn_r (0.04648 0.03358 -0.02985)
      PathPoint pathpoint_2: calcn_r (0.07548 0.01876 -0.02804)
      PathPoint pathpoint_3: calcn_r (0.17675 -0.00864 0.01237)
      PathPoint pathpoint_4: toes_r (-0.00203 -0.00832 0.01567)
      PathPoint pathpoint_5: toes_r (0.03038 -0.00757 0.02292)
      PathPoint pathpoint_6: toes_r (0.04701 -0.0064 0.0258)
    Millard2012EquilibriumMuscle fhl_r: min_control=0.01 max_control=1 max_isometric_force=436.8
        optimal_fiber_length=0.05486 tendon_slack_length=0.37059 pennation_angle_at_optimal=0.2947861
      PathPoint: tibia_r (-0.03162 -0.22065 0.0204)
      PathPoint pathpoint_0: tibia_r (-0.02469 -0.37448 -0.00775)
      PathPoint pathpoint_1: calcn_r (0.03987 0.02942 -0.02569)
      PathPoint pathpoint_2: calcn_r (0.11066 0.00725 -0.02729)
      PathPoint pathpoint_3: calcn_r (0.184 -0.00565 -0.02868)
      PathPoint pathpoint_4: toes_r (0.01652 -0.00682 -0.02825)
      PathPoint pathpoint_5: toes_r (0.05991 -0.01087 -0.0193)
    Millard2012EquilibriumMuscle gaslat_r: min_control=0.01 max_control=1 max_isometric_force=606.4
        optimal_fiber_length=0.05999 tendon_slack_length=0.37647 pennation_angle_at_optimal=0.2101376
      PathPoint: femur_r (-0.01335 -0.40249 0.02082)
      PathPoint pathpoint_0: calcn_r (0.00469 0.03305 -0.00565)
      PathWrap: wrap_object=Gastroc_at_Condyles_r method=hybrid
    Millard2012EquilibriumMuscle gasmed_r: min_control=0.01 max_control=1 max_isometric_force=1308
        optimal_fiber_length=0.05209 tendon_slack_length=0.3973 pennation_angle_at_optimal=0.1724385
      PathPoint: femur_r (-0.01111 -0.39959 -0.02315)
      PathPoint pathpoint_0: calcn_r (0.00469 0.03305 -0.00565)
      PathWrap: wrap_object=Gastroc_at_Condyles_r method=hybrid
    Millard2012EquilibriumMuscle gem_r: min_control=0.01 max_control=1 max_isometric_force=218
        optimal_fiber_length=0.02453 tendon_slack_length=0.03986 pennation_angle_at_optimal=0
      PathPoint: pelvis (-0.09604 -0.07084 0.06219)
      PathPoint pathpoint_0: femur_r (-0.0158 -0.00367 0.04931)
    Millard2012EquilibriumMuscle glmax1_r: min_control=0.01 max_control=1 max_isometric_force=1092.2
        optimal_fiber_length=0.14583 tendon_slack_length=0.0495 pennation_angle_at_optimal=0.3829252
      PathPoint: pelvis (-0.11415 0.03199 0.05221)
      PathPoint pathpoint_0: pelvis (-0.11656 -0.02244 0.07224)
      PathPoint pathpoint_1: femur_r (-0.04942 -0.03628 0.03361)
      PathPoint pathpoint_2: femur_r (-0.03083 -0.063 0.05231)
      PathWrap: wrap_object=Gmax_at_pelvis_r method=hybrid
    Millard2012EquilibriumMuscle glmax2_r: min_control=0.01 max_control=1 max_isometric_force=1561
        optimal_fiber_length=0.15892 tendon_slack_length=0.07425 pennation_angle_at_optimal=0.3829252
      PathPoint: pelvis (-0.12212 0.00807 0.04284)
      PathPoint pathpoint_0: pelvis (-0.12463 -0.05647 0.07539)
      PathPoint pathpoint_1: femur_r (-0.05009 -0.065 0.02805)
      PathPoint pathpoint_2: femur_r (-0.01736 -0.11308 0.04664)
      PathWrap: wrap_object=Gmax_at_pelvis_r method=hybrid
    Millard2012EquilibriumMuscle glmax3_r: min_control=0.01 max_control=1 max_isometric_force=1058.2
        optimal_fiber_length=0.17267 tendon_slack_length=0.0728 pennation_angle_at_optimal=0.3829252
      PathPoint: pelvis (-0.12055 -0.04868 0.00835)
      PathPoint pathpoint_0: pelvis (-0.11804 -0.11712 0.04034)
      PathPoint pathpoint_1: femur_r (-0.03128 -0.12522 0.01046)
      PathPoint pathpoint_2: femur_r (-0.00668 -0.15794 0.04575)
      PathWrap: wrap_object=Gmax_at_pelvis_r method=hybrid
    Millard2012EquilibriumMuscle glmed1_r: min_control=0.01 max_control=1 max_isometric_force=1762.2
        optimal_fiber_length=0.07101 tendon_slack_length=0.05473 pennation_angle_at_optimal=0.3572689
      PathPoint: pelvis (-0.04126 0.02272 0.10868)
      PathPoint pathpoint_0: femur_r (-0.02426 -0.01302 0.06177)
    Millard2012EquilibriumMuscle glmed2_r: min_control=0.01 max_control=1 max_isometric_force=1033
        optimal_fiber_length=0.0712 tendon_slack_length=0.06411 pennation_angle_at_optimal=0.3572689
      PathPoint: pelvis (-0.07882 0.0293 0.06259)
      PathPoint pathpoint_0: femur_r (-0.02872 -0.00646 0.05866)
    Millard2012EquilibriumMuscle glmed3_r: min_control=0.01 max_control=1 max_isometric_force=1404
        optimal_fiber_length=0.07203 tendon_slack_length=0.0452 pennation_angle_at_optimal=0.3572689
      PathPoint: pelvis (-0.10682 -0.00677 0.04878)
      PathPoint pathpoint_0: femur_r (-0.03439 -0.00523 0.05765)
    Millard2012EquilibriumMuscle glmin1_r: min_control=0.01 max_control=1 max_isometric_force=720
        optimal_fiber_length=0.06819 tendon_slack_length=0.01605 pennation_angle_at_optimal=0.1745329
      PathPoint: pelvis (-0.04303 -0.01382 0.09662)
      PathPoint pathpoint_0: femur_r (-0.00801 -0.01158 0.06233)
    Millard2012EquilibriumMuscle glmin2_r: min_control=0.01 max_control=1 max_isometric_force=760
        optimal_fiber_length=0.05644 tendon_slack_length=0.0262 pennation_angle_at_optimal=0
      PathPoint: pelvis (-0.05712 -0.01317 0.09004)
      PathPoint pathpoint_0: femur_r (-0.01069 -0.01158 0.06233)
    Millard2012EquilibriumMuscle glmin3_r: min_control=0.01 max_control=1 max_isometric_force=860
        optimal_fiber_length=0.03833 tendon_slack_length=0.05144 pennation_angle_at_optimal=0.01745329
      PathPoint: pelvis (-0.07316 -0.01437 0.074)
      PathPoint pathpoint_0: femur_r (-0.01503 -0.00924 0.06122)
    Millard2012EquilibriumMuscle grac_r: min_control=0.01 max_control=1 max_isometric_force=137.3
        optimal_fiber_length=0.254 tendon_slack_length=0.18844 pennation_angle_at_optimal=0.1424189
      PathPoint: pelvis (-0.04392 -0.11992 0.02277)
      PathPoint pathpoint_0: tibia_r (-0.01879 -0.04851 -0.03021)
      PathPoint pathpoint_1: tibia_r (0.00182 -0.07102 -0.01605)
      PathWrap: wrap_object=GR_at_condyles_r method=midpoint
    Millard2012EquilibriumMuscle iliacus_r: min_control=0.01 max_control=1 max_isometric_force=2487.6
        optimal_fiber_length=0.1051 tendon_slack_length=0.09268 pennation_angle_at_optimal=0.2494076
      PathPoint: pelvis (-0.0561 0.02865 0.07817)
      PathPoint pathpoint_0: pelvis (-0.01252 -0.05165 0.0701)
      PathPoint pathpoint_1: femur_r (-0.00256 -0.06289 0.01547)
      PathPoint pathpoint_2: femur_r (-0.01358 -0.07079 0.02182)
      PathWrap: wrap_object=IL_at_brim_r method=hybrid
    Millard2012EquilibriumMuscle pect_r: min_control=0.01 max_control=1 max_isometric_force=177
        optimal_fiber_length=0.10664 tendon_slack_length=0.03519 pennation_angle_at_optimal=0
      PathPoint: pelvis (-0.02151 -0.0772 0.042)
      PathPoint pathpoint_0: femur_r (-0.00887 -0.09481 0.02675)
      PathWrap: wrap_object=PECT_at_femshaft_r method=hybrid
    Millard2012EquilibriumMuscle perbrev_r: min_control=0.01 max_control=1 max_isometric_force=305.9
        optimal_fiber_length=0.04689 tendon_slack_length=0.15297 pennation_angle_at_optimal=0.2000147
      PathPoint: tibia_r (-0.02479 -0.25829 0.0256)
      PathPoint pathpoint_0: tibia_r (-0.03458 -0.39712 0.0254)
      PathPoint pathpoint_1: tibia_r (-0.02907 -0.40845 0.02601)
      PathPoint pathpoint_2: calcn_r (0.05021 0.02878 0.02484)
      PathPoint pathpoint_3: calcn_r (0.07217 0.02335 0.03657)
    Millard2012EquilibriumMuscle perlong_r: min_control=0.01 max_control=1 max_isometric_force=653.3
        optimal_fiber_length=0.05253 tendon_slack_length=0.34436 pennation_angle_at_optimal=0.2457424
      PathPoint: tibia_r (-0.0204 -0.14006 0.02877)
      PathPoint pathpoint_0: tibia_r (-0.03234 -0.39784 0.02418)
      PathPoint pathpoint_1: tibia_r (-0.02775 -0.40947 0.02448)
      PathPoint pathpoint_2: calcn_r (0.04669 0.02452 0.02356)
      PathPoint pathpoint_3: calcn_r (0.0726 0.0113 0.03028)
      PathPoint pathpoint_4: calcn_r (0.09083 0.00736 0.01258)
      PathPoint pathpoint_5: calcn_r (0.12825 0.00906 -0.01962)
    Millard2012EquilibriumMuscle pertert_r: min_control=0.01 max_control=1 max_isometric_force=90
        optimal_fiber_length=0.0812 tendon_slack_length=0.10279 pennation_angle_at_optimal=0.2268928
      PathPoint: tibia_r (-0.0152 -0.25349 0.02265)
      PathPoint pathpoint_0: tibia_r (0.01102 -0.38968 0.02295)
      PathPoint pathpoint_1: calcn_r (0.09136 0.02431 0.03188)
    Millard2012EquilibriumMuscle piri_r: min_control=0.01 max_control=1 max_isometric_force=296
        optimal_fiber_length=0.02513 tendon_slack_length=0.11116 pennation_angle_at_optimal=0.1745329
      PathPoint: pelvis (-0.09441 -0.00606 0.01253)
      PathPoint pathpoint_0: pelvis (-0.0946 -0.02843 0.05649)
      PathPoint pathpoint_1: femur_r (-0.01647 -0.00401 0.04864)
    Millard2012EquilibriumMuscle psoas_r: min_control=0.01 max_control=1 max_isometric_force=1916
        optimal_fiber_length=0.11362 tendon_slack_length=0.09428 pennation_angle_at_optimal=0.1860521
      PathPoint: pelvis (-0.05619 0.0574 0.03616)
      PathPoint pathpoint_0: pelvis (-0.01901 -0.06064 0.06083)
      PathPoint pathpoint_1: femur_r (-0.01469 -0.05198 0.00512)
      PathPoint pathpoint_2: femur_r (-0.02616 -0.05832 0.00979)
      PathWrap: wrap_object=PS_at_brim_r method=hybrid
    Millard2012EquilibriumMuscle quadfem_r: min_control=0.01 max_control=1 max_isometric_force=508
        optimal_fiber_length=0.05451 tendon_slack_length=0.02422 pennation_angle_at_optimal=0
      PathPoint: pelvis (-0.10378 -0.10639 0.0479)
      PathPoint pathpoint_0: femur_r (-0.03979 -0.03953 0.0402)
    Millard2012EquilibriumMuscle recfem_r: min_control=0.01 max_control=1 max_isometric_force=848.8
        optimal_fiber_length=0.08313 tendon_slack_length=0.39887 pennation_angle_at_optimal=0.2431244
      PathPoint: pelvis (-0.02225 -0.03598 0.08652)
      PathPoint pathpoint_0: patella_r (0.00779 0.02601 0.00127)
      PathPoint pathpoint_1: patella_r (0.00781 0.01934 0.00088)
      PathWrap: wrap_object=KnExt_at_fem_r
    Millard2012EquilibriumMuscle sart_r: min_control=0.01 max_control=1 max_isometric_force=113.5
        optimal_fiber_length=0.43221 tendon_slack_length=0.11797 pennation_angle_at_optimal=0.02321288
      PathPoint: pelvis (-0.01808 -0.01447 0.09792)
      PathPoint pathpoint_0: femur_r (-0.00334 -0.39713 -0.04686)
      PathPoint pathpoint_1: tibia_r (-0.0256 -0.04091 -0.03723)
      PathPoint pathpoint_2: tibia_r (-0.01622 -0.0611 -0.02693)
      PathPoint pathpoint_3: tibia_r (0.01387 -0.08263 -0.00265)
    Millard2012EquilibriumMuscle semimem_r: min_control=0.01 max_control=1 max_isometric_force=1162.7
        optimal_fiber_length=0.0772 tendon_slack_length=0.42292 pennation_angle_at_optimal=0.2633702
      PathPoint: pelvis (-0.09152 -0.10571 0.05694)
      PathPoint pathpoint_0: tibia_r (-0.01958 -0.05255 -0.01999)
    Millard2012EquilibriumMuscle semiten_r: min_control=0.01 max_control=1 max_isometric_force=301.9
        optimal_fiber_length=0.21456 tendon_slack_length=0.27237 pennation_angle_at_optimal=0.2244493
      PathPoint: pelvis (-0.09625 -0.11619 0.04776)
      PathPoint pathpoint_0: tibia_r (-0.02182 -0.05182 -0.04137)
      PathPoint pathpoint_1: tibia_r (0.02195 -0.07885 -0.02394)
    Millard2012EquilibriumMuscle soleus_r: min_control=0.01 max_control=1 max_isometric_force=3585.9
        optimal_fiber_length=0.04469 tendon_slack_length=0.2859 pennation_angle_at_optimal=0.4930555
      PathPoint: tibia_r (-0.00775 -0.09344 0.01)
      PathPoint pathpoint_0: calcn_r (0.00469 0.03305 -0.00565)
    Millard2012EquilibriumMuscle tfl_r: min_control=0.01 max_control=1 max_isometric_force=155
        optimal_fiber_length=0.10198 tendon_slack_length=0.48308 pennation_angle_at_optimal=0.05235988
      PathPoint: pelvis (-0.02884 0.01984 0.11508)
      PathPoint pathpoint_0: femur_r (0.03272 -0.11075 0.06645)
      PathPoint pathpoint_1: tibia_r (0.01102 -0.04182 0.0353)
    Millard2012EquilibriumMuscle tibant_r: min_control=0.01 max_control=1 max_isometric_force=673.7
        optimal_fiber_length=0.07023 tendon_slack_length=0.24782 pennation_angle_at_optimal=0.1668535
      PathPoint: tibia_r (0.01571 -0.13384 0.01653)
      PathPoint pathpoint_0: tibia_r (0.0256 -0.19443 0.01306)
      PathPoint pathpoint_1: tibia_r (0.02377 -0.37325 -0.01347)
      PathPoint pathpoint_2: calcn_r (0.1243 0.01898 -0.03251)
    Millard2012EquilibriumMuscle tibpost_r: min_control=0.01 max_control=1 max_isometric_force=905.6
        optimal_fiber_length=0.03861 tendon_slack_length=0.28786 pennation_angle_at_optimal=0.2392846
      PathPoint: tibia_r (-0.00418 -0.13302 0.01051)
      PathPoint pathpoint_0: tibia_r (-0.01673 -0.37285 -0.01785)
      PathPoint pathpoint_1: calcn_r (0.04445 0.03561 -0.03049)
      PathPoint pathpoint_2: calcn_r (0.0823 0.01695 -0.02996)
    Millard2012EquilibriumMuscle vasint_r: min_control=0.01 max_control=1 max_isometric_force=1024.2
        optimal_fiber_length=0.11052 tendon_slack_length=0.13534 pennation_angle_at_optimal=0.07923795
      PathPoint: femur_r (0.02627 -0.21415 0.0225)
      PathPoint pathpoint_0: femur_r (0.03328 -0.23195 0.01971)
      PathPoint pathpoint_1: patella_r (0.00366 0.02144 0.0016)
      PathWrap: wrap_object=KnExt_vasint_at_fem_r
    Millard2012EquilibriumMuscle vaslat_r: min_control=0.01 max_control=1 max_isometric_force=2255.4
        optimal_fiber_length=0.11063 tendon_slack_length=0.15838 pennation_angle_at_optimal=0.3207915
      PathPoint: femur_r (0.01535 -0.21436 0.03484)
      PathPoint pathpoint_0: femur_r (0.02994 -0.28838 0.03752)
      PathPoint pathpoint_1: patella_r (0.00174 0.01814 0.01319)
      PathWrap: wrap_object=KnExt_at_fem_r
    Millard2012EquilibriumMuscle vasmed_r: min_control=0.01 max_control=1 max_isometric_force=1443.7
        optimal_fiber_length=0.10774 tendon_slack_length=0.14091 pennation_angle_at_optimal=0.516792
      PathPoint: femur_r (0.01558 -0.23362 0.00491)
      PathPoint pathpoint_0: femur_r (0.03962 -0.3082 -0.01301)
      PathPoint pathpoint_1: patella_r (0.00946 0.0188 -0.01239)
      PathWrap: wrap_object=KnExt_at_fem_r
    Blankevoort1991Ligament pCAP1: linear_stiffness=500 [N] slack_length=0.06665395 [m]
      PathPoint pCAP: femur_distal_r (-0.00674 0.02682 -0.02672)
      PathPoint pCAP_0: tibia_proximal_r (-0.02134 -0.04693 -0.01936)
      PathWrap: wrap_object=Capsule_r method=hybrid
    Blankevoort1991Ligament pCAP2: linear_stiffness=500 slack_length=0.06626586
      PathPoint pCAP2: femur_distal_r (-0.00695 0.02647 0.02684)
      PathPoint pCAP2_0: tibia_proximal_r (-0.01746 -0.04973 0.02383)
      PathWrap: wrap_object=Capsule_r method=hybrid
    Blankevoort1991Ligament pCAP3: linear_stiffness=500 slack_length=0.07685679
      PathPoint pCAP3: femur_distal_r (-0.00674 0.02682 -0.02561)
      PathPoint pCAP3_0: tibia_proximal_r (-0.01745 -0.04974 0.02272)
      PathWrap: wrap_object=Capsule_r method=hybrid
    Blankevoort1991Ligament pCAP4: linear_stiffness=500 slack_length=0.08094421
      PathPoint pCAP4: femur_distal_r (-0.00695 0.02647 0.02573)
      PathPoint pCAP4_0: tibia_proximal_r (-0.02135 -0.04692 -0.01825)
      PathWrap: wrap_object=Capsule_r method=hybrid
    Blankevoort1991Ligament pCAP5: linear_stiffness=500 slack_length=0.06632486
      PathPoint pCAP5: femur_distal_r (-0.00674 0.02682 -0.02227)
      PathPoint pCAP5_0: tibia_proximal_r (-0.02138 -0.04691 -0.01491)
      PathWrap: wrap_object=Capsule_r method=hybrid
    Blankevoort1991Ligament pCAP6: linear_stiffness=500 slack_length=0.06660239
      PathPoint pCAP6: femur_distal_r (-0.00695 0.02647 0.02239)
      PathPoint pCAP6_0: tibia_proximal_r (-0.01743 -0.04975 0.01938)
      PathWrap: wrap_object=Capsule_r method=hybrid
    Blankevoort1991Ligament pCAP7: linear_stiffness=500 slack_length=0.06599638
      PathPoint pCAP7: femur_distal_r (-0.00674 0.02682 -0.01782)
      PathPoint pCAP7_0: tibia_proximal_r (-0.02141 -0.04689 -0.01046)
      PathWrap: wrap_object=Capsule_r method=hybrid
    Blankevoort1991Ligament pCAP8: linear_stiffness=500 slack_length=0.06693889
      PathPoint pCAP8: femur_distal_r (-0.00695 0.02647 0.01793)
      PathPoint pCAP8_0: tibia_proximal_r (-0.01739 -0.04977 0.01493)
      PathWrap: wrap_object=Capsule_r method=hybrid
    Blankevoort1991Ligament ITB_r: linear_stiffness=4000 slack_length=0.5973984
      PathPoint ITB_r: pelvis (-0.06491 0.04636 0.09273)
      PathPoint ITB_r_0: femur_r (-0.01113 -0.00523 0.06678)
      PathPoint ITB_r_1: tibia_r (0.02503 -0.04163 0.04331)
      PathPoint ITB_r_2: tibia_r (0.02771 -0.05844 0.0335)
    Blankevoort1991Ligament MCLd1: linear_stiffness=280 slack_length=0.05438907
      PathPoint MCLd1: femur_r (0.00658 -0.41535 -0.04778)
      PathPoint MCLd1_0: tibia_proximal_r (0.00529 -0.0488 -0.04004)
    Blankevoort1991Ligament MCLd2: linear_stiffness=280 slack_length=0.05474282
      PathPoint MCLd2: femur_r (0.00718 -0.41401 -0.0481)
      PathPoint MCLd2_0: tibia_proximal_r (0.00819 -0.04823 -0.04039)
    Blankevoort1991Ligament MCLd3: linear_stiffness=280 slack_length=0.05269151
      PathPoint MCLd3: femur_r (0.00687 -0.41793 -0.04809)
      PathPoint MCLd3_0: tibia_proximal_r (0.00177 -0.04864 -0.03988)
    Blankevoort1991Ligament MCLd4: linear_stiffness=280 slack_length=0.05779752
      PathPoint MCLd4: femur_r (0.0025 -0.41212 -0.04846)
      PathPoint MCLd4_0: tibia_proximal_r (0.00604 -0.04987 -0.04004)
    Blankevoort1991Ligament MCLd5: linear_stiffness=280 slack_length=0.05402063
      PathPoint MCLd5: femur_r (0.00983 -0.41474 -0.04735)
      PathPoint MCLd5_0: tibia_proximal_r (0.00703 -0.04744 -0.04044)
    Blankevoort1991Ligament MCLd6: linear_stiffness=280 slack_length=0.05469291
      PathPoint MCLd6: femur_r (0.00415 -0.41731 -0.04805)
      PathPoint MCLd6_0: tibia_proximal_r (1e-5 -0.05045 -0.03926)
    Blankevoort1991Ligament MCLd7: linear_stiffness=280 slack_length=0.05710612
      PathPoint MCLd7: femur_r (0.00617 -0.41129 -0.04787)
      PathPoint MCLd7_0: tibia_proximal_r (0.01219 -0.04858 -0.03963)
    Blankevoort1991Ligament MCLd8: linear_stiffness=280 slack_length=0.0507603
      PathPoint MCLd8: femur_r (0.01021 -0.41929 -0.04709)
      PathPoint MCLd8_0: tibia_proximal_r (0.00268 -0.04713 -0.03991)
    Blankevoort1991Ligament MCLd9: linear_stiffness=280 slack_length=0.05603101
      PathPoint MCLd9: femur_r (0.00152 -0.41463 -0.04833)
      PathPoint MCLd9_0: tibia_proximal_r (0.00391 -0.05042 -0.03982)
    Blankevoort1991Ligament MCLd10: linear_stiffness=280 slack_length=0.05235806
      PathPoint MCLd10: femur_r (0.00644 -0.4148 -0.04833)
      PathPoint MCLd10_0: tibia_proximal_r (0.01036 -0.04693 -0.04052)
    Blankevoort1991Ligament MCLs1: linear_stiffness=110 slack_length=0.1090462
      PathPoint MCLs1: femur_r (0.00844 -0.40937 -0.04608)
      PathPoint MCLs1_0: tibia_proximal_r (0.00868 -0.09586 -0.02514)
      PathWrap: wrap_object=Med_Lig_r method=hybrid
    Blankevoort1991Ligament MCLs2: linear_stiffness=110 slack_length=0.1086299
      PathPoint MCLs2: femur_r (0.00761 -0.40959 -0.047)
      PathPoint MCLs2_0: tibia_proximal_r (0.00682 -0.09572 -0.02574)
      PathWrap: wrap_object=Med_Lig_r method=hybrid
    Blankevoort1991Ligament MCLs3: linear_stiffness=110 slack_length=0.1068539
      PathPoint MCLs3: femur_r (0.00904 -0.40835 -0.04578)
      PathPoint MCLs3_0: tibia_proximal_r (0.01119 -0.09259 -0.02499)
      PathWrap: wrap_object=Med_Lig_r method=hybrid
    Blankevoort1991Ligament MCLs4: linear_stiffness=110 slack_length=0.1133319
      PathPoint MCLs4: femur_r (0.00912 -0.41163 -0.04706)
      PathPoint MCLs4_0: tibia_proximal_r (0.00766 -0.10294 -0.02525)
      PathWrap: wrap_object=Med_Lig_r method=hybrid
    Blankevoort1991Ligament MCLs5: linear_stiffness=110 slack_length=0.1051341
      PathPoint MCLs5: femur_r (0.00585 -0.40711 -0.0462)
      PathPoint MCLs5_0: tibia_proximal_r (0.0073 -0.08937 -0.02613)
      PathWrap: wrap_object=Med_Lig_r method=hybrid
    Blankevoort1991Ligament MCLs6: linear_stiffness=110 slack_length=0.1109333
      PathPoint MCLs6: femur_r (0.01123 -0.40969 -0.04523)
      PathPoint MCLs6_0: tibia_proximal_r (0.01167 -0.09822 -0.02406)
      PathWrap: wrap_object=Med_Lig_r method=hybrid
    Blankevoort1991Ligament MCLs7: linear_stiffness=110 slack_length=0.1107781
      PathPoint MCLs7: femur_r (0.00749 -0.4109 -0.04744)
      PathPoint MCLs7_0: tibia_proximal_r (0.00551 -0.09923 -0.0254)
      PathWrap: wrap_object=Med_Lig_r method=hybrid
    Blankevoort1991Ligament MCLs8: linear_stiffness=110 slack_length=0.1038404
      PathPoint MCLs8: femur_r (0.00814 -0.40716 -0.04538)
      PathPoint MCLs8_0: tibia_proximal_r (0.01068 -0.08787 -0.02521)
      PathWrap: wrap_object=Med_Lig_r method=hybrid
    Blankevoort1991Ligament MCLs9: linear_stiffness=110 slack_length=0.1151674
      PathPoint MCLs9: femur_r (0.01107 -0.4129 -0.04643)
      PathPoint MCLs9_0: tibia_proximal_r (0.0098 -0.10622 -0.02445)
      PathWrap: wrap_object=Med_Lig_r method=hybrid
    Blankevoort1991Ligament MCLs10: linear_stiffness=110 slack_length=0.1051382
      PathPoint MCLs10: femur_r (0.00505 -0.40867 -0.04724)
      PathPoint MCLs10_0: tibia_proximal_r (0.00423 -0.09086 -0.0262)
      PathWrap: wrap_object=Med_Lig_r method=hybrid
    Blankevoort1991Ligament MCLs11: linear_stiffness=110 slack_length=0.1080172
      PathPoint MCLs11: femur_r (0.01029 -0.40798 -0.04482)
      PathPoint MCLs11_0: tibia_proximal_r (0.01355 -0.09309 -0.02329)
      PathWrap: wrap_object=Med_Lig_r method=hybrid
    Blankevoort1991Ligament MCLs12: linear_stiffness=110 slack_length=0.1149905
      PathPoint MCLs12: femur_r (0.00839 -0.4128 -0.04757)
      PathPoint MCLs12_0: tibia_proximal_r (0.00521 -0.10541 -0.02432)
      PathWrap: wrap_object=Med_Lig_r method=hybrid
    Blankevoort1991Ligament MCLs13: linear_stiffness=110 slack_length=0.1025488
      PathPoint MCLs13: femur_r (0.00592 -0.40572 -0.04527)
      PathPoint MCLs13_0: tibia_proximal_r (0.00852 -0.08504 -0.02633)
      PathWrap: wrap_object=Med_Lig_r method=hybrid
    Blankevoort1991Ligament MCLs14: linear_stiffness=110 slack_length=0.1135134
      PathPoint MCLs14: femur_r (0.01309 -0.41191 -0.04485)
      PathPoint MCLs14_0: tibia_proximal_r (0.01251 -0.10333 -0.02348)
      PathWrap: wrap_object=Med_Lig_r method=hybrid
    Blankevoort1991Ligament MCLs15: linear_stiffness=110 slack_length=0.109477
      PathPoint MCLs15: femur_r (0.0063 -0.41062 -0.04767)
      PathPoint MCLs15_0: tibia_proximal_r (0.00337 -0.09707 -0.02481)
      PathWrap: wrap_object=Med_Lig_r method=hybrid
    Blankevoort1991Ligament MCLs16: linear_stiffness=110 slack_length=0.1026188
      PathPoint MCLs16: femur_r (0.00895 -0.40669 -0.04466)
      PathPoint MCLs16_0: tibia_proximal_r (0.01341 -0.0857 -0.0239)
      PathWrap: wrap_object=Med_Lig_r method=hybrid
    Blankevoort1991Ligament MCLs17: linear_stiffness=110 slack_length=0.1180886
      PathPoint MCLs17: femur_r (0.01047 -0.41437 -0.04704)
      PathPoint MCLs17_0: tibia_proximal_r (0.00776 -0.11061 -0.02414)
      PathWrap: wrap_object=Med_Lig_r method=hybrid
    Blankevoort1991Ligament MCLs18: linear_stiffness=110 slack_length=0.1015334
      PathPoint MCLs18: femur_r (0.00269 -0.40618 -0.04622)
      PathPoint MCLs18_0: tibia_proximal_r (0.00443 -0.0845 -0.02699)
      PathWrap: wrap_object=Med_Lig_r method=hybrid
    Blankevoort1991Ligament MCLs19: linear_stiffness=110 slack_length=0.110963
      PathPoint MCLs19: femur_r (0.01225 -0.40884 -0.044)
      PathPoint MCLs19_0: tibia_proximal_r (0.01436 -0.09704 -0.02228)
      PathWrap: wrap_object=Med_Lig_r method=hybrid
    Blankevoort1991Ligament MCLs20: linear_stiffness=110 slack_length=0.1138204
      PathPoint MCLs20: femur_r (0.00714 -0.41279 -0.04795)
      PathPoint MCLs20_0: tibia_proximal_r (0.00323 -0.10367 -0.02354)
      PathWrap: wrap_object=Med_Lig_r method=hybrid
    Blankevoort1991Ligament PCLal1: linear_stiffness=570 slack_length=0.04294732
      PathPoint PCLal1: femur_r (-0.003 -0.42684 -0.0132)
      PathPoint PCLal1_0: tibia_proximal_r (-0.01146 -0.04636 0.00366)
    Blankevoort1991Ligament PCLal2: linear_stiffness=570 slack_length=0.04281157
      PathPoint PCLal2: femur_r (-0.00357 -0.42675 -0.01498)
      PathPoint PCLal2_0: tibia_proximal_r (-0.01147 -0.04628 0.00188)
    Blankevoort1991Ligament PCLal3: linear_stiffness=570 slack_length=0.04478872
      PathPoint PCLal3: femur_r (-0.0021 -0.42557 -0.01196)
      PathPoint PCLal3_0: tibia_proximal_r (-0.01227 -0.04636 0.00526)
    Blankevoort1991Ligament PCLal4: linear_stiffness=570 slack_length=0.04021879
      PathPoint PCLal4: femur_r (-0.00289 -0.42958 -0.01379)
      PathPoint PCLal4_0: tibia_proximal_r (-0.01015 -0.04646 0.00328)
    Blankevoort1991Ligament PCLal5: linear_stiffness=570 slack_length=0.04514203
      PathPoint PCLal5: femur_r (-0.00429 -0.42419 -0.0146)
      PathPoint PCLal5_0: tibia_proximal_r (-0.01286 -0.04615 0.00191)
    Blankevoort1991Ligament PCLal6: linear_stiffness=570 slack_length=0.04308243
      PathPoint PCLal6: femur_r (-0.00091 -0.42773 -0.01051)
      PathPoint PCLal6_0: tibia_proximal_r (-0.01115 -0.04655 0.00672)
    Blankevoort1991Ligament PCLal7: linear_stiffness=570 slack_length=0.04067303
      PathPoint PCLal7: femur_r (-0.00434 -0.42837 -0.01544)
      PathPoint PCLal7_0: tibia_proximal_r (-0.01054 -0.04631 0.00096)
    Blankevoort1991Ligament PCLal8: linear_stiffness=570 slack_length=0.04644834
      PathPoint PCLal8: femur_r (-0.00303 -0.42343 -0.01186)
      PathPoint PCLal8_0: tibia_proximal_r (-0.01328 -0.04623 0.00467)
    Blankevoort1991Ligament PCLal9: linear_stiffness=570 slack_length=0.03874201
      PathPoint PCLal9: femur_r (-0.0019 -0.43143 -0.0116)
      PathPoint PCLal9_0: tibia_proximal_r (-0.00945 -0.04661 0.00521)
    Blankevoort1991Ligament PCLal10: linear_stiffness=570 slack_length=0.04341495
      PathPoint PCLal10: femur_r (-0.00569 -0.42523 -0.01621)
      PathPoint PCLal10_0: tibia_proximal_r (-0.0123 -0.04611 -0.00026)
    Blankevoort1991Ligament PCLpm1: linear_stiffness=240 slack_length=0.0465289
      PathPoint PCLpm1: femur_r (-0.00954 -0.42633 -0.01693)
      PathPoint PCLpm1_0: tibia_proximal_r (-0.01543 -0.04635 0.00392)
    Blankevoort1991Ligament PCLpm2: linear_stiffness=240 slack_length=0.04516405
      PathPoint PCLpm2: femur_r (-0.01197 -0.42622 -0.01739)
      PathPoint PCLpm2_0: tibia_proximal_r (-0.01578 -0.04601 0.00191)
    Blankevoort1991Ligament PCLpm3: linear_stiffness=240 slack_length=0.047811
      PathPoint PCLpm3: femur_r (-0.00739 -0.42619 -0.01712)
      PathPoint PCLpm3_0: tibia_proximal_r (-0.01463 -0.04626 0.0061)
    Blankevoort1991Ligament PCLpm4: linear_stiffness=240 slack_length=0.04506093
      PathPoint PCLpm4: femur_r (-0.01022 -0.4284 -0.017)
      PathPoint PCLpm4_0: tibia_proximal_r (-0.01645 -0.04672 0.00369)
    Blankevoort1991Ligament PCLpm5: linear_stiffness=240 slack_length=0.04671157
      PathPoint PCLpm5: femur_r (-0.01109 -0.4245 -0.01772)
      PathPoint PCLpm5_0: tibia_proximal_r (-0.01443 -0.046 0.00176)
    Blankevoort1991Ligament PCLpm6: linear_stiffness=240 slack_length=0.0475525
      PathPoint PCLpm6: femur_r (-0.00589 -0.42796 -0.01637)
      PathPoint PCLpm6_0: tibia_proximal_r (-0.01559 -0.04641 0.00717)
    Blankevoort1991Ligament PCLpm7: linear_stiffness=240 slack_length=0.04355268
      PathPoint PCLpm7: femur_r (-0.01329 -0.42729 -0.01701)
      PathPoint PCLpm7_0: tibia_proximal_r (-0.01693 -0.04591 0.00034)
    Blankevoort1991Ligament PCLpm8: linear_stiffness=240 slack_length=0.04879436
      PathPoint PCLpm8: femur_r (-0.00742 -0.42427 -0.01696)
      PathPoint PCLpm8_0: tibia_proximal_r (-0.01327 -0.04627 0.00549)
    Blankevoort1991Ligament PCLpm9: linear_stiffness=240 slack_length=0.04559751
      PathPoint PCLpm9: femur_r (-0.00811 -0.42989 -0.01626)
      PathPoint PCLpm9_0: tibia_proximal_r (-0.01625 -0.04769 0.00508)
    Blankevoort1991Ligament PCLpm10: linear_stiffness=240 slack_length=0.04548183
      PathPoint PCLpm10: femur_r (-0.01434 -0.42433 -0.01744)
      PathPoint PCLpm10_0: tibia_proximal_r (-0.01527 -0.04583 -0.00033)
    Blankevoort1991Ligament LCL1: linear_stiffness=180 slack_length=0.05649776
      PathPoint LCL1: femur_r (-0.01039 -0.41499 0.03747)
      PathPoint LCL1_0: tibia_proximal_r (-0.00561 -0.05927 0.04748)
    Blankevoort1991Ligament LCL2: linear_stiffness=180 slack_length=0.0558609
      PathPoint LCL2: femur_r (-0.01134 -0.41513 0.03708)
      PathPoint LCL2_0: tibia_proximal_r (-0.00465 -0.05889 0.04717)
    Blankevoort1991Ligament LCL3: linear_stiffness=180 slack_length=0.0573858
      PathPoint LCL3: femur_r (-0.00923 -0.41363 0.03814)
      PathPoint LCL3_0: tibia_proximal_r (-0.00789 -0.05841 0.04754)
    Blankevoort1991Ligament LCL4: linear_stiffness=180 slack_length=0.05481958
      PathPoint LCL4: femur_r (-0.01118 -0.41854 0.03769)
      PathPoint LCL4_0: tibia_proximal_r (-0.00429 -0.06125 0.04813)
    Blankevoort1991Ligament LCL5: linear_stiffness=180 slack_length=0.05748372
      PathPoint LCL5: femur_r (-0.01062 -0.41259 0.03676)
      PathPoint LCL5_0: tibia_proximal_r (-0.00543 -0.05792 0.04684)
    Blankevoort1991Ligament LCL6: linear_stiffness=180 slack_length=0.0561593
      PathPoint LCL6: femur_r (-0.00932 -0.41652 0.03876)
      PathPoint LCL6_0: tibia_proximal_r (-0.00675 -0.06022 0.0481)
    Blankevoort1991Ligament LCL7: linear_stiffness=180 slack_length=0.05463791
      PathPoint LCL7: femur_r (-0.01243 -0.41729 0.03695)
      PathPoint LCL7_0: tibia_proximal_r (-0.00269 -0.05991 0.04719)
    Blankevoort1991Ligament LCL8: linear_stiffness=180 slack_length=0.05795759
      PathPoint LCL8: femur_r (-0.00897 -0.41098 0.03747)
      PathPoint LCL8_0: tibia_proximal_r (-0.00827 -0.05621 0.04661)
    Blankevoort1991Ligament LCL9: linear_stiffness=180 slack_length=0.05403776
      PathPoint LCL9: femur_r (-0.0103 -0.41998 0.03818)
      PathPoint LCL9_0: tibia_proximal_r (-0.00535 -0.0617 0.04845)
    Blankevoort1991Ligament LCL10: linear_stiffness=180 slack_length=0.05672672
      PathPoint LCL10: femur_r (-0.01175 -0.41333 0.03631)
      PathPoint LCL10_0: tibia_proximal_r (-0.00442 -0.05801 0.04662)
    Blankevoort1991Ligament PT1: linear_stiffness=490 slack_length=0.07558521
      PathPoint PT1: patella_r (0.01033 -0.01708 -0.00539)
      PathPoint PT1_0: tibia_proximal_r (0.04095 -0.0919 0.00796)
      PathWrap: wrap_object=PatTen_r method=hybrid
    Blankevoort1991Ligament PT2: linear_stiffness=490 slack_length=0.07540479
      PathPoint PT2: patella_r (0.01095 -0.01711 -0.0087)
      PathPoint PT2_0: tibia_proximal_r (0.04187 -0.09177 0.00641)
      PathWrap: wrap_object=PatTen_r method=hybrid
    Blankevoort1991Ligament PT3: linear_stiffness=490 slack_length=0.07612805
      PathPoint PT3: patella_r (0.01108 -0.01557 -0.00021)
      PathPoint PT3_0: tibia_proximal_r (0.04004 -0.09067 0.00969)
      PathWrap: wrap_object=PatTen_r method=hybrid
    Blankevoort1991Ligament PT4: linear_stiffness=490 slack_length=0.07516421
      PathPoint PT4: patella_r (0.01042 -0.01966 -0.00643)
      PathPoint PT4_0: tibia_proximal_r (0.04145 -0.09421 0.0076)
      PathWrap: wrap_object=PatTen_r method=hybrid
    Blankevoort1991Ligament PT5: linear_stiffness=490 slack_length=0.07536731
      PathPoint PT5: patella_r (0.01139 -0.01484 -0.00944)
      PathPoint PT5_0: tibia_proximal_r (0.04123 -0.08907 0.00586)
      PathWrap: wrap_object=PatTen_r method=hybrid
    Blankevoort1991Ligament PT6: linear_stiffness=490 slack_length=0.07621415
      PathPoint PT6: patella_r (0.0106 -0.01762 0.00014)
      PathPoint PT6_0: tibia_proximal_r (0.03982 -0.09288 0.01111)
      PathWrap: wrap_object=PatTen_r method=hybrid
    Blankevoort1991Ligament PT7: linear_stiffness=490 slack_length=0.07589922
      PathPoint PT7: patella_r (0.00987 -0.01811 -0.01045)
      PathPoint PT7_0: tibia_proximal_r (0.04193 -0.09348 0.0048)
      PathWrap: wrap_object=PatTen_r method=hybrid
    Blankevoort1991Ligament PT8: linear_stiffness=490 slack_length=0.07494778
      PathPoint PT8: patella_r (0.01173 -0.01578 -0.00425)
      PathPoint PT8_0: tibia_proximal_r (0.04007 -0.08934 0.00879)
      PathWrap: wrap_object=PatTen_r method=hybrid
    Blankevoort1991Ligament PT9: linear_stiffness=490 slack_length=0.07557707
      PathPoint PT9: patella_r (0.00996 -0.02056 -0.00182)
      PathPoint PT9_0: tibia_proximal_r (0.04059 -0.09558 0.00943)
      PathWrap: wrap_object=PatTen_r method=hybrid
    Blankevoort1991Ligament PT10: linear_stiffness=490 slack_length=0.076235
      PathPoint PT10: patella_r (0.00912 -0.01498 -0.01507)
      PathPoint PT10_0: tibia_proximal_r (0.04198 -0.09023 0.00402)
      PathWrap: wrap_object=PatTen_r method=hybrid
    Blankevoort1991Ligament PT11: linear_stiffness=490 slack_length=0.07658142
      PathPoint PT11: patella_r (0.00959 -0.01556 0.00469)
      PathPoint PT11_0: tibia_proximal_r (0.03832 -0.09086 0.012)
      PathWrap: wrap_object=PatTen_r method=hybrid
    Blankevoort1991Ligament PT12: linear_stiffness=490 slack_length=0.076382
      PathPoint PT12: patella_r (0.00924 -0.01978 -0.00956)
      PathPoint PT12_0: tibia_proximal_r (0.04129 -0.09564 0.00548)
      PathWrap: wrap_object=PatTen_r method=hybrid
    Blankevoort1991Ligament PT13: linear_stiffness=490 slack_length=0.07358664
      PathPoint PT13: patella_r (0.01223 -0.01588 -0.00521)
      PathPoint PT13_0: tibia_proximal_r (0.04048 -0.08806 0.00697)
      PathWrap: wrap_object=PatTen_r method=hybrid
    Blankevoort1991Ligament PT14: linear_stiffness=490 slack_length=0.07719582
      PathPoint PT14: patella_r (0.00932 -0.01894 0.00151)
      PathPoint PT14_0: tibia_proximal_r (0.03902 -0.09527 0.01233)
      PathWrap: wrap_object=PatTen_r method=hybrid
    Blankevoort1991Ligament PT15: linear_stiffness=490 slack_length=0.07590585
      PathPoint PT15: patella_r (0.00839 -0.01721 -0.01426)
      PathPoint PT15_0: tibia_proximal_r (0.04208 -0.09254 0.00298)
      PathWrap: wrap_object=PatTen_r method=hybrid
    Blankevoort1991Ligament PT16: linear_stiffness=490 slack_length=0.07648941
      PathPoint PT16: patella_r (0.01109 -0.01364 0.0018)
      PathPoint PT16_0: tibia_proximal_r (0.03857 -0.08854 0.01071)
      PathWrap: wrap_object=PatTen_r method=hybrid
    Blankevoort1991Ligament PT17: linear_stiffness=490 slack_length=0.07436713
      PathPoint PT17: patella_r (0.00866 -0.02289 -0.00476)
      PathPoint PT17_0: tibia_proximal_r (0.0407 -0.09682 0.00794)
      PathWrap: wrap_object=PatTen_r method=hybrid
    Blankevoort1991Ligament PT18: linear_stiffness=490 slack_length=0.07711624
      PathPoint PT18: patella_r (0.00889 -0.01163 -0.0179)
      PathPoint PT18_0: tibia_proximal_r (0.04073 -0.08719 0.0023)
      PathWrap: wrap_object=PatTen_r method=hybrid
    Blankevoort1991Ligament PT19: linear_stiffness=490 slack_length=0.07684353
      PathPoint PT19: patella_r (0.00821 -0.0169 0.00505)
      PathPoint PT19_0: tibia_proximal_r (0.03746 -0.0925 0.0132)
      PathWrap: wrap_object=PatTen_r method=hybrid
    Blankevoort1991Ligament PT20: linear_stiffness=490 slack_length=0.07684652
      PathPoint PT20: patella_r (0.00774 -0.01926 -0.01256)
      PathPoint PT20_0: tibia_proximal_r (0.04133 -0.09572 0.00288)
      PathWrap: wrap_object=PatTen_r method=hybrid
    Blankevoort1991Ligament PT21: linear_stiffness=490 slack_length=0.07485922
      PathPoint PT21: patella_r (0.01231 -0.01445 -0.00461)
      PathPoint PT21_0: tibia_proximal_r (0.03969 -0.0876 0.00828)
      PathWrap: wrap_object=PatTen_r method=hybrid
    Blankevoort1991Ligament PT22: linear_stiffness=490 slack_length=0.07736354
      PathPoint PT22: patella_r (0.00769 -0.02073 0.0018)
      PathPoint PT22_0: tibia_proximal_r (0.03916 -0.09761 0.01161)
      PathWrap: wrap_object=PatTen_r method=hybrid
    Blankevoort1991Ligament PT23: linear_stiffness=490 slack_length=0.07606007
      PathPoint PT23: patella_r (0.00699 -0.01547 -0.01711)
      PathPoint PT23_0: tibia_proximal_r (0.04211 -0.09078 0.00213)
      PathWrap: wrap_object=PatTen_r method=hybrid
    Blankevoort1991Ligament PT24: linear_stiffness=490 slack_length=0.07833028
      PathPoint PT24: patella_r (0.00763 -0.01256 0.01135)
      PathPoint PT24_0: tibia_proximal_r (0.03654 -0.08909 0.01293)
      PathWrap: wrap_object=PatTen_r method=hybrid
    Blankevoort1991Ligament PT25: linear_stiffness=490 slack_length=0.07610729
      PathPoint PT25: patella_r (0.0068 -0.02187 -0.00943)
      PathPoint PT25_0: tibia_proximal_r (0.04079 -0.09763 0.00566)
      PathWrap: wrap_object=PatTen_r method=hybrid
    Blankevoort1991Ligament PT26: linear_stiffness=490 slack_length=0.07418641
      PathPoint PT26: patella_r (0.01172 -0.01321 -0.01034)
      PathPoint PT26_0: tibia_proximal_r (0.04024 -0.08574 0.00424)
      PathWrap: wrap_object=PatTen_r method=hybrid
    Blankevoort1991Ligament PT27: linear_stiffness=490 slack_length=0.0779373
      PathPoint PT27: patella_r (0.00618 -0.01817 0.00561)
      PathPoint PT27_0: tibia_proximal_r (0.03675 -0.09509 0.01384)
      PathWrap: wrap_object=PatTen_r method=hybrid
    Blankevoort1991Ligament PT28: linear_stiffness=490 slack_length=0.07687581
      PathPoint PT28: patella_r (0.00527 -0.01781 -0.01642)
      PathPoint PT28_0: tibia_proximal_r (0.04145 -0.09429 0.00079)
      PathWrap: wrap_object=PatTen_r method=hybrid
    Blankevoort1991Ligament PT29: linear_stiffness=490 slack_length=0.07501067
      PathPoint PT29: patella_r (0.01127 -0.01383 -0.00123)
      PathPoint PT29_0: tibia_proximal_r (0.03866 -0.08704 0.01029)
      PathWrap: wrap_object=PatTen_r method=hybrid
    Blankevoort1991Ligament PT30: linear_stiffness=490 slack_length=0.07500766
      PathPoint PT30: patella_r (0.00576 -0.02374 -0.00052)
      PathPoint PT30_0: tibia_proximal_r (0.03978 -0.09859 0.00926)
      PathWrap: wrap_object=PatTen_r method=hybrid
    Blankevoort1991Ligament lPFL1: linear_stiffness=53.333 slack_length=0.0501803
      PathPoint lPFL1: femur_r (0.00279 -0.41542 0.0386)
      PathPoint lPFL1_0: patella_r (0.00266 0.00287 0.0211)
      PathWrap: wrap_object=lPFL_r method=hybrid
    Blankevoort1991Ligament lPFL2: linear_stiffness=53.333 slack_length=0.04847943
      PathPoint lPFL2: femur_r (0.00418 -0.41523 0.03836)
      PathPoint lPFL2_0: patella_r (0.00247 0.00348 0.02165)
      PathWrap: wrap_object=lPFL_r method=hybrid
    Blankevoort1991Ligament lPFL3: linear_stiffness=53.333 slack_length=0.05188192
      PathPoint lPFL3: femur_r (0.00147 -0.41394 0.03911)
      PathPoint lPFL3_0: patella_r (0.00323 0.0052 0.02239)
      PathWrap: wrap_object=lPFL_r method=hybrid
    Blankevoort1991Ligament lPFL4: linear_stiffness=53.333 slack_length=0.04958222
      PathPoint lPFL4: femur_r (0.00344 -0.41847 0.03882)
      PathPoint lPFL4_0: patella_r (0.00308 -0.003 0.02029)
      PathWrap: wrap_object=lPFL_r method=hybrid
    Blankevoort1991Ligament lPFL5: linear_stiffness=53.333 slack_length=0.04776562
      PathPoint lPFL5: femur_r (0.00368 -0.4122 0.03804)
      PathPoint lPFL5_0: patella_r (0.0008 0.00657 0.02177)
      PathWrap: wrap_object=lPFL_r method=hybrid
    Blankevoort1991Ligament lPFL6: linear_stiffness=53.333 slack_length=0.05332439
      PathPoint lPFL6: femur_r (0.00093 -0.41671 0.03961)
      PathPoint lPFL6_0: patella_r (0.00449 0.00138 0.02177)
      PathWrap: wrap_object=lPFL_r method=hybrid
    Blankevoort1991Ligament lPFL7: linear_stiffness=53.333 slack_length=0.04602731
      PathPoint lPFL7: femur_r (0.00529 -0.41744 0.03815)
      PathPoint lPFL7_0: patella_r (0.00095 3e-5 0.02073)
      PathWrap: wrap_object=lPFL_r method=hybrid
    Blankevoort1991Ligament lPFL8: linear_stiffness=53.333 slack_length=0.05248535
      PathPoint lPFL8: femur_r (0.00158 -0.41164 0.03859)
      PathPoint lPFL8_0: patella_r (0.00304 0.00932 0.02153)
      PathWrap: wrap_object=lPFL_r method=hybrid
    Blankevoort1991Ligament lPFL9: linear_stiffness=53.333 slack_length=0.05221287
      PathPoint lPFL9: femur_r (0.00225 -0.41991 0.03917)
      PathPoint lPFL9_0: patella_r (0.00469 -0.00295 0.0202)
      PathWrap: wrap_object=lPFL_r method=hybrid
    Blankevoort1991Ligament lPFL10: linear_stiffness=53.333 slack_length=0.04555379
      PathPoint lPFL10: femur_r (0.00547 -0.41298 0.03758)
      PathPoint lPFL10_0: patella_r (0.00064 0.00247 0.02106)
      PathWrap: wrap_object=lPFL_r method=hybrid
    Blankevoort1991Ligament lPFL11: linear_stiffness=53.333 slack_length=0.05528362
      PathPoint lPFL11: femur_r (-0.00014 -0.41417 0.03971)
      PathPoint lPFL11_0: patella_r (0.00505 0.00505 0.02214)
      PathWrap: wrap_object=lPFL_r method=hybrid
    Blankevoort1991Ligament lPFL12: linear_stiffness=53.333 slack_length=0.04804991
      PathPoint lPFL12: femur_r (0.00479 -0.42007 0.03838)
      PathPoint lPFL12_0: patella_r (0.00257 -0.00464 0.01934)
      PathWrap: wrap_object=lPFL_r method=hybrid
    Blankevoort1991Ligament lPFL13: linear_stiffness=53.333 slack_length=0.05172757
      PathPoint lPFL13: femur_r (0.00284 -0.40982 0.03771)
      PathPoint lPFL13_0: patella_r (0.0021 0.01273 0.01936)
      PathWrap: wrap_object=lPFL_r method=hybrid
    Blankevoort1991Ligament lPFL14: linear_stiffness=53.333 slack_length=0.05488855
      PathPoint lPFL14: femur_r (0.0004 -0.41926 0.03977)
      PathPoint lPFL14_0: patella_r (0.00555 -0.00118 0.02073)
      PathWrap: wrap_object=lPFL_r method=hybrid
    Blankevoort1991Ligament lPFL15: linear_stiffness=53.333 slack_length=0.04650668
      PathPoint lPFL15: femur_r (0.00616 -0.41626 0.03775)
      PathPoint lPFL15_0: patella_r (0.00215 0.00252 0.02063)
      PathWrap: wrap_object=lPFL_r method=hybrid
    Blankevoort1991Ligament mPFL1: linear_stiffness=66.667 slack_length=0.04518288
      PathPoint mPFL1: femur_r (0.01275 -0.41572 -0.04536)
      PathPoint mPFL1_0: patella_r (0.00556 0.0026 -0.02657)
    Blankevoort1991Ligament mPFL2: linear_stiffness=66.667 slack_length=0.04563309
      PathPoint mPFL2: femur_r (0.01134 -0.41588 -0.04678)
      PathPoint mPFL2_0: patella_r (0.00416 0.00206 -0.02689)
    Blankevoort1991Ligament mPFL3: linear_stiffness=66.667 slack_length=0.04540955
      PathPoint mPFL3: femur_r (0.01471 -0.41313 -0.04402)
      PathPoint mPFL3_0: patella_r (0.00704 0.00649 -0.02469)
    Blankevoort1991Ligament mPFL4: linear_stiffness=66.667 slack_length=0.0456858
      PathPoint mPFL4: femur_r (0.01261 -0.41983 -0.04581)
      PathPoint mPFL4_0: patella_r (0.00657 -0.00248 -0.02702)
    Blankevoort1991Ligament mPFL5: linear_stiffness=66.667 slack_length=0.04536752
      PathPoint mPFL5: femur_r (0.01142 -0.41316 -0.04629)
      PathPoint mPFL5_0: patella_r (0.00354 0.00467 -0.02628)
    Blankevoort1991Ligament mPFL6: linear_stiffness=66.667 slack_length=0.04412692
      PathPoint mPFL6: femur_r (0.01586 -0.4171 -0.04378)
      PathPoint mPFL6_0: patella_r (0.00821 0.00214 -0.02617)
    Blankevoort1991Ligament mPFL7: linear_stiffness=66.667 slack_length=0.04543001
      PathPoint mPFL7: femur_r (0.00925 -0.41925 -0.04744)
      PathPoint mPFL7_0: patella_r (0.00242 -0.00288 -0.0276)
    Blankevoort1991Ligament mPFL8: linear_stiffness=66.667 slack_length=0.04556821
      PathPoint mPFL8: femur_r (0.01316 -0.40891 -0.04334)
      PathPoint mPFL8_0: patella_r (0.00355 0.01077 -0.02103)
    Blankevoort1991Ligament mPFL9: linear_stiffness=66.667 slack_length=0.04521824
      PathPoint mPFL9: femur_r (0.01424 -0.42079 -0.04464)
      PathPoint mPFL9_0: patella_r (0.00783 -0.00164 -0.02611)
    Blankevoort1991Ligament mPFL10: linear_stiffness=66.667 slack_length=0.04616275
      PathPoint mPFL10: femur_r (0.00982 -0.41412 -0.04728)
      PathPoint mPFL10_0: patella_r (0.00233 0.00324 -0.02604)
    Blankevoort1991Ligament mPFL11: linear_stiffness=66.667 slack_length=0.04421506
      PathPoint mPFL11: femur_r (0.01703 -0.41336 -0.04202)
      PathPoint mPFL11_0: patella_r (0.00878 0.00533 -0.02391)
    Blankevoort1991Ligament mPFL12: linear_stiffness=66.667 slack_length=0.04616609
      PathPoint mPFL12: femur_r (0.01042 -0.42291 -0.04634)
      PathPoint mPFL12_0: patella_r (0.00488 -0.00704 -0.02653)
    Blankevoort1991Ligament mPFL13: linear_stiffness=66.667 slack_length=0.04516634
      PathPoint mPFL13: femur_r (0.01102 -0.40975 -0.0454)
      PathPoint mPFL13_0: patella_r (0.0018 0.00881 -0.0242)
    Blankevoort1991Ligament mPFL14: linear_stiffness=66.667 slack_length=0.04428713
      PathPoint mPFL14: femur_r (0.0164 -0.4197 -0.04329)
      PathPoint mPFL14_0: patella_r (0.00894 -0.00042 -0.02494)
    Blankevoort1991Ligament mPFL15: linear_stiffness=66.667 slack_length=0.04701752
      PathPoint mPFL15: femur_r (0.00752 -0.4175 -0.04803)
      PathPoint mPFL15_0: patella_r (0.00107 -0.00017 -0.02617)
    Blankevoort1991Ligament pMC1: linear_stiffness=200 slack_length=0.06285992
      PathPoint pMC1: femur_r (-0.0048 -0.40808 -0.04517)
      PathPoint pMC1_0: tibia_proximal_r (-0.01216 -0.04944 -0.03087)
      PathWrap: wrap_object=Med_LigP_r method=hybrid
    Blankevoort1991Ligament pMC2: linear_stiffness=200 slack_length=0.06190236
      PathPoint pMC2: femur_r (-0.00311 -0.40849 -0.04668)
      PathPoint pMC2_0: tibia_proximal_r (-0.01 -0.04944 -0.03311)
      PathWrap: wrap_object=Med_LigP_r method=hybrid
    Blankevoort1991Ligament pMC3: linear_stiffness=200 slack_length=0.06371249
      PathPoint pMC3: femur_r (-0.00456 -0.40777 -0.04562)
      PathPoint pMC3_0: tibia_proximal_r (-0.01389 -0.0486 -0.02848)
      PathWrap: wrap_object=Med_LigP_r method=hybrid
    Blankevoort1991Ligament pMC4: linear_stiffness=200 slack_length=0.0625647
      PathPoint pMC4: femur_r (-0.00562 -0.40946 -0.04607)
      PathPoint pMC4_0: tibia_proximal_r (-0.01194 -0.05109 -0.03164)
      PathWrap: wrap_object=Med_LigP_r method=hybrid
    Blankevoort1991Ligament pMC5: linear_stiffness=200 slack_length=0.06312086
      PathPoint pMC5: femur_r (-0.00145 -0.40656 -0.04608)
      PathPoint pMC5_0: tibia_proximal_r (-0.01058 -0.04808 -0.03275)
      PathWrap: wrap_object=Med_LigP_r method=hybrid
    Blankevoort1991Ligament pMC6: linear_stiffness=200 slack_length=0.06471217
      PathPoint pMC6: femur_r (-0.00836 -0.40733 -0.04186)
      PathPoint pMC6_0: tibia_proximal_r (-0.01445 -0.04987 -0.02723)
      PathWrap: wrap_object=Med_LigP_r method=hybrid
    Blankevoort1991Ligament pMC7: linear_stiffness=200 slack_length=0.06105878
      PathPoint pMC7: femur_r (-0.00331 -0.40993 -0.0475)
      PathPoint pMC7_0: tibia_proximal_r (-0.00893 -0.05045 -0.03395)
      PathWrap: wrap_object=Med_LigP_r method=hybrid
    Blankevoort1991Ligament pMC8: linear_stiffness=200 slack_length=0.06167886
      PathPoint pMC8: femur_r (-0.00468 -0.40841 -0.04557)
      PathPoint pMC8_0: tibia_proximal_r (-0.01339 -0.04752 -0.02951)
      PathWrap: wrap_object=Med_LigP_r method=hybrid
    Blankevoort1991Ligament pMC9: linear_stiffness=200 slack_length=0.06341611
      PathPoint pMC9: femur_r (-0.00784 -0.40983 -0.04477)
      PathPoint pMC9_0: tibia_proximal_r (-0.01392 -0.05181 -0.02889)
      PathWrap: wrap_object=Med_LigP_r method=hybrid
    Blankevoort1991Ligament pMC10: linear_stiffness=200 slack_length=0.06052479
      PathPoint pMC10: femur_r (-0.00023 -0.40871 -0.04749)
      PathPoint pMC10_0: tibia_proximal_r (-0.00729 -0.04847 -0.03544)
      PathWrap: wrap_object=Med_LigP_r method=hybrid
    Blankevoort1991Ligament PFL1: linear_stiffness=300 slack_length=0.04555884
      PathPoint PFL1: femur_r (-0.00151 -0.42619 0.03843)
      PathPoint PFL1_0: tibia_proximal_r (-0.0153 -0.04764 0.04119)
    Blankevoort1991Ligament PFL2: linear_stiffness=300 slack_length=0.04360967
      PathPoint PFL2: femur_r (-0.00378 -0.4268 0.03821)
      PathPoint PFL2_0: tibia_proximal_r (-0.01492 -0.04708 0.03863)
    Blankevoort1991Ligament PFL3: linear_stiffness=300 slack_length=0.04749739
      PathPoint PFL3: femur_r (-0.00022 -0.42501 0.03896)
      PathPoint PFL3_0: tibia_proximal_r (-0.01673 -0.0472 0.04332)
    Blankevoort1991Ligament PFL4: linear_stiffness=300 slack_length=0.04236133
      PathPoint PFL4: femur_r (-0.00149 -0.42865 0.03796)
      PathPoint PFL4_0: tibia_proximal_r (-0.01238 -0.04822 0.04093)
    Blankevoort1991Ligament PFL5: linear_stiffness=300 slack_length=0.04610523
      PathPoint PFL5: femur_r (-0.00431 -0.42463 0.039)
      PathPoint PFL5_0: tibia_proximal_r (-0.01701 -0.04694 0.03947)
    Blankevoort1991Ligament PFL6: linear_stiffness=300 slack_length=0.04841084
      PathPoint PFL6: femur_r (0.00276 -0.42597 0.03833)
      PathPoint PFL6_0: tibia_proximal_r (-0.0149 -0.04862 0.04432)
    Blankevoort1991Ligament PFL7: linear_stiffness=300 slack_length=0.04281039
      PathPoint PFL7: femur_r (-0.00419 -0.42819 0.03756)
      PathPoint PFL7_0: tibia_proximal_r (-0.0132 -0.04864 0.03744)
    Blankevoort1991Ligament PFL8: linear_stiffness=300 slack_length=0.04969697
      PathPoint PFL8: femur_r (-0.00116 -0.42374 0.03936)
      PathPoint PFL8_0: tibia_proximal_r (-0.01931 -0.04724 0.04248)
    Blankevoort1991Ligament PFL9: linear_stiffness=300 slack_length=0.04424921
      PathPoint PFL9: femur_r (0.0017 -0.42974 0.03789)
      PathPoint PFL9_0: tibia_proximal_r (-0.01197 -0.05011 0.04321)
    Blankevoort1991Ligament PFL10: linear_stiffness=300 slack_length=0.04529405
      PathPoint PFL10: femur_r (-0.00767 -0.4258 0.03792)
      PathPoint PFL10_0: tibia_proximal_r (-0.01689 -0.04851 0.03616)
    SpringGeneralizedForce knee_add_r: coordinate=knee_add_r viscosity=5
    SpringGeneralizedForce knee_rot_r: coordinate=knee_rot_r viscosity=5
    SpringGeneralizedForce knee_tx_r: coordinate=knee_tx_r viscosity=100
    SpringGeneralizedForce knee_ty_r: coordinate=knee_ty_r viscosity=100
    SpringGeneralizedForce knee_tz_r: coordinate=knee_tz_r viscosity=100
    SpringGeneralizedForce pf_flex_r: coordinate=pf_flex_r viscosity=2
    SpringGeneralizedForce pf_rot_r: coordinate=pf_rot_r viscosity=2
    SpringGeneralizedForce pf_tilt_r: coordinate=pf_tilt_r viscosity=2
    SpringGeneralizedForce pf_tx_r: coordinate=pf_tx_r viscosity=10
    SpringGeneralizedForce pf_ty_r: coordinate=pf_ty_r viscosity=10
    SpringGeneralizedForce pf_tz_r: coordinate=pf_tz_r viscosity=10
    Smith2018ArticularContactForce knee_contact: socket_target_mesh=/contactgeometryset/femur_implant
        socket_casting_mesh=/contactgeometryset/tibia_implant min_proximity=0 max_proximity=0.02
        elastic_foundation_formulation=nonlinear use_lumped_contact_model=false
      # Combine the thickness and the average material properties between the Smith2018ContactMeshes for both meshes and use Bei & Fregly 2003 lumped parameter Elastic Foundation model.
    Smith2018ArticularContactForce pf_contact: socket_target_mesh=/contactgeometryset/femur_implant
        socket_casting_mesh=/contactgeometryset/patella_implant
  ContactGeometrySet:
    Smith2018ContactMesh femur_implant: socket_frame=/bodyset/femur_r socket_scale_frame=/bodyset/femur_r
        mesh_file=femur_component_surface_gc_m1.stl elastic_modulus=4630000 poissons_ratio=0.46 thickness=0.003
        scale_factors=(1.055 1.055 1.055)
    Smith2018ContactMesh tibia_implant: socket_frame=/bodyset/tibia_proximal_r
        socket_scale_frame=/bodyset/tibia_proximal_r mesh_file=tibia_insert_surface_gc_p1.stl elastic_modulus=4630000
        poissons_ratio=0.46 thickness=0.003 scale_factors=(1.055 1.055 1.055)
    Smith2018ContactMesh patella_implant: socket_frame=/bodyset/patella_r socket_scale_frame=/bodyset/patella_r
        mesh_file=patella_button_surface_v2.stl elastic_modulus=4630000 poissons_ratio=0.46 thickness=0.003
        scale_factors=(1.055 1.055 1.055)
  MarkerSet:
    Marker Sacral: pelvis (-0.181544 0.012642 -0.002238)
    Marker R_Asis: pelvis (0.024094 0.006655 0.134059)
    Marker R_Psis: pelvis (-0.182008 0.013051 0.036254)
    Marker L_Asis: pelvis (0.024094 0.006655 -0.134059)
    Marker L_Psis: pelvis (-0.181081 0.012233 -0.04073)
    Marker Sternum: torso (0.03558252 0.3556942 0)
    Marker Xiphoid: torso (0.116039 0.202091 0)
    Marker Thoracic: torso (-0.1184593 0.177878 0)
    Marker Lumbar: torso (-0.0840131 0.01743126 0)
    Marker Neck: torso (-0.08253603 0.373374 0)
    Marker R_Shoulder: torso (-0.02002145 0.3897032 0.1510429)
    Marker R_ShoulderAnterior: torso (0.020297 0.311915 0.158159)
    Marker R_ShoulderPosterior: torso (-0.091207 0.31307 0.195723)
    Marker L_Shoulder: torso (-0.0200215 0.389703 -0.151043)
    Marker L_ShoulderAnterior: torso (0.015397 0.317276 -0.142308)
    Marker L_ShoulderPosterior: torso (-0.10446 0.305912 -0.169738)
    Marker R_Elbow: humerus_r (-0.002232 -0.312486 0.037628)
    Marker R_ElbowMedial: humerus_r (-0.016828 -0.296808 -0.053571)
    Marker R_Wrist: radius_r (-0.036159 -0.265098 0.01178)
    Marker R_Ulna: radius_r (-0.032441 -0.256098 -0.034169)
    Marker R_Radius: radius_r (0.004872 -0.256876 0.027647)
    Marker L_Elbow: humerus_l (0.011145 -0.319785 -0.041225)
    Marker L_ElbowMedial: humerus_l (-0.025993 -0.304036 0.042876)
    Marker L_Wrist: radius_l (-0.029418 -0.264892 -0.007872)
    Marker L_Ulna: radius_l (-0.057526 -0.245586 0.024773)
    Marker L_Radius: radius_l (0.014706 -0.250901 0.006387)
    Marker R_Knee_Lateral: femur_r (0.014489 -0.398031 0.049518)
    Marker R_Knee_Medial: femur_r (-0.579721 -0.957485 0.325136)
    Marker R_Thigh_Superior: femur_r (-0.005525 -0.120497 0.092733)
    Marker R_Thigh_Inferior: femur_r (0.008977 -0.32964 0.054344)
    Marker R_Thigh_Lateral: femur_r (0.085281 -0.27016 0.008635)
    Marker R_Ankle_Lateral: tibia_r (-0.022927 -0.411956 0.050459)
    Marker RankleMedial: tibia_r (-0.004209 -0.395443 -0.035087)
    Marker R_Shank_Superior: tibia_r (-0.043055 -0.106486 0.063642)
    Marker R_Shank_Inferior: tibia_r (-0.022753 -0.311148 0.048959)
    Marker R_Shank_Lateral: tibia_r (0.029163 -0.186138 -0.015747)
    Marker R_Patella: patella_r (0.027006 0.030145 -0.020732)
    Marker R_Toe: calcn_r (0.265255 -0.005811 0.013131)
    Marker R_ToeMedial: calcn_r (0.234574 -0.013071 -0.034541)
    Marker R_ToeLateral: calcn_r (0.221568 -0.024052 0.056842)
    Marker R_Midfoot_Medial: calcn_r (0.191846 -0.023436 -0.047923)
    Marker R_Midfoot_Lateral: calcn_r (0.172412 -0.034411 0.067205)
    Marker R_Midfoot_Superior: calcn_r (0.12338 0.057285 0.007638)
    Marker R_Heel: calcn_r (-0.034198 -0.003095 -0.011775)
    Marker R_Hindfoot: calcn_r (0.062751 -0.03872 0.04632)
    Marker L_Knee_Lateral: femur_l (-0.00104 -0.403403 -0.043941)
    Marker L_Knee_Medial: femur_l (-0.004259 -0.405038 0.085341)
    Marker L_Thigh_Superior: femur_l (0.027185 -0.106794 -0.089055)
    Marker L_Thigh_Inferior: femur_l (0.034298 -0.326583 -0.040475)
    Marker L_Thigh_Lateral: femur_l (0.086951 -0.237038 -0.014373)
    Marker L_Ankle_Lateral: tibia_l (-0.015457 -0.398233 -0.049661)
    Marker L_Ankle_Medial: tibia_l (-0.006677 -0.38883 0.039881)
    Marker L_Shank_Superior: tibia_l (-0.005966 -0.051199 -0.052526)
    Marker L_Shank_Inferior: tibia_l (-0.024749 -0.321734 -0.050091)
    Marker L_Shank_Lateral: tibia_l (0.017856 -0.195174 0.019163)
    Marker L_Patella: patella_l (0.01499 0.027532 0.022671)
    Marker L_Toe: calcn_l (0.263659 0.002235 -0.014394)
    Marker L_ToeMedial: calcn_l (0.226791 -0.012365 0.031533)
    Marker L_ToeLateral: calcn_l (0.225234 -0.019096 -0.064988)
    Marker L_Midfoot_Medial: calcn_l (0.184127 -0.018062 0.038607)
    Marker L_Midfoot_Lateral: calcn_l (0.169344 -0.023233 -0.074799)
    Marker L_Midfoot_Superior: calcn_l (0.12394 0.063309 -0.01679)
    Marker L_Heel: calcn_l (-0.036862 0.002487 -0.005087)
    Marker L_Hindfoot: calcn_l (0.0619 -0.030217 -0.062294)
